! Add_Geradores_BT_7_MTQ_RMTQ1302
New "PVsystem.BT_PV0" phases=3 bus1="BT4335105245908179MT02.1.2.3" conn=Delta kv=0.22 pf=1.0 pmpp=18.4 kva=16.0 %pmpp=100 irradiance=0.59 temperature=25 %cutin=0.1 %cutout=0.1 effcurve=Myeff P-TCurve=MyPvsT Daily=PVIrrad_RMTQ1302 TDaily=MyTemp
New "PVsystem.BT_PV1" phases=1 bus1="BT4371555945371113MT02.1.2" conn=Delta kv=0.22 pf=1.0 pmpp=3.507 kva=3.05 %pmpp=100 irradiance=0.59 temperature=25 %cutin=0.1 %cutout=0.1 effcurve=Myeff P-TCurve=MyPvsT Daily=PVIrrad_RMTQ1302 TDaily=MyTemp
New "PVsystem.BT_PV2" phases=3 bus1="BT4371555945371113MT02.1.2.3" conn=Delta kv=0.22 pf=1.0 pmpp=17.25 kva=15.0 %pmpp=100 irradiance=0.59 temperature=25 %cutin=0.1 %cutout=0.1 effcurve=Myeff P-TCurve=MyPvsT Daily=PVIrrad_RMTQ1302 TDaily=MyTemp
New "PVsystem.BT_PV3" phases=3 bus1="BT4371555945371113MT02.1.2.3" conn=Delta kv=0.22 pf=1.0 pmpp=10.35 kva=9.0 %pmpp=100 irradiance=0.59 temperature=25 %cutin=0.1 %cutout=0.1 effcurve=Myeff P-TCurve=MyPvsT Daily=PVIrrad_RMTQ1302 TDaily=MyTemp
New "PVsystem.BT_PV4" phases=3 bus1="BT4371555945371113MT02.1.2.3" conn=Delta kv=0.22 pf=1.0 pmpp=7.762 kva=6.75 %pmpp=100 irradiance=0.59 temperature=25 %cutin=0.1 %cutout=0.1 effcurve=Myeff P-TCurve=MyPvsT Daily=PVIrrad_RMTQ1302 TDaily=MyTemp
New "PVsystem.BT_PV5" phases=1 bus1="BT4362260145330391MT02.1.2" conn=Delta kv=0.22 pf=1.0 pmpp=5.244 kva=4.56 %pmpp=100 irradiance=0.59 temperature=25 %cutin=0.1 %cutout=0.1 effcurve=Myeff P-TCurve=MyPvsT Daily=PVIrrad_RMTQ1302 TDaily=MyTemp
New "PVsystem.BT_PV6" phases=1 bus1="BT4362260145330391MT02.1.3" conn=Delta kv=0.22 pf=1.0 pmpp=3.45 kva=3.0 %pmpp=100 irradiance=0.59 temperature=25 %cutin=0.1 %cutout=0.1 effcurve=Myeff P-TCurve=MyPvsT Daily=PVIrrad_RMTQ1302 TDaily=MyTemp
New "PVsystem.BT_PV7" phases=1 bus1="BT4362260145330391MT02.1.2" conn=Delta kv=0.22 pf=1.0 pmpp=4.6 kva=4.0 %pmpp=100 irradiance=0.59 temperature=25 %cutin=0.1 %cutout=0.1 effcurve=Myeff P-TCurve=MyPvsT Daily=PVIrrad_RMTQ1302 TDaily=MyTemp
New "PVsystem.BT_PV8" phases=3 bus1="BT4297644945462728MT02.1.2.3" conn=Delta kv=0.22 pf=1.0 pmpp=43.125 kva=37.5 %pmpp=100 irradiance=0.59 temperature=25 %cutin=0.1 %cutout=0.1 effcurve=Myeff P-TCurve=MyPvsT Daily=PVIrrad_RMTQ1302 TDaily=MyTemp
New "PVsystem.BT_PV9" phases=3 bus1="BT4374832145369223MT02.1.2.3" conn=Delta kv=0.22 pf=1.0 pmpp=16.1 kva=14.0 %pmpp=100 irradiance=0.59 temperature=25 %cutin=0.1 %cutout=0.1 effcurve=Myeff P-TCurve=MyPvsT Daily=PVIrrad_RMTQ1302 TDaily=MyTemp
New "PVsystem.BT_PV10" phases=3 bus1="BT4374832145369223MT02.1.2.3" conn=Delta kv=0.22 pf=1.0 pmpp=3.45 kva=3.0 %pmpp=100 irradiance=0.59 temperature=25 %cutin=0.1 %cutout=0.1 effcurve=Myeff P-TCurve=MyPvsT Daily=PVIrrad_RMTQ1302 TDaily=MyTemp
New "PVsystem.BT_PV11" phases=3 bus1="BT4374832145369223MT02.1.2.3" conn=Delta kv=0.22 pf=1.0 pmpp=4.6 kva=4.0 %pmpp=100 irradiance=0.59 temperature=25 %cutin=0.1 %cutout=0.1 effcurve=Myeff P-TCurve=MyPvsT Daily=PVIrrad_RMTQ1302 TDaily=MyTemp
New "PVsystem.BT_PV12" phases=1 bus1="BT4358670145322249MT02.2.3" conn=Delta kv=0.22 pf=1.0 pmpp=8.625 kva=7.5 %pmpp=100 irradiance=0.59 temperature=25 %cutin=0.1 %cutout=0.1 effcurve=Myeff P-TCurve=MyPvsT Daily=PVIrrad_RMTQ1302 TDaily=MyTemp
New "PVsystem.BT_PV13" phases=3 bus1="BT4373122845384672MT02.1.2.3" conn=Delta kv=0.22 pf=1.0 pmpp=11.5 kva=10.0 %pmpp=100 irradiance=0.59 temperature=25 %cutin=0.1 %cutout=0.1 effcurve=Myeff P-TCurve=MyPvsT Daily=PVIrrad_RMTQ1302 TDaily=MyTemp
New "PVsystem.BT_PV14" phases=3 bus1="BT4373122845384672MT02.1.2.3" conn=Delta kv=0.22 pf=1.0 pmpp=6.9 kva=6.0 %pmpp=100 irradiance=0.59 temperature=25 %cutin=0.1 %cutout=0.1 effcurve=Myeff P-TCurve=MyPvsT Daily=PVIrrad_RMTQ1302 TDaily=MyTemp
New "PVsystem.BT_PV15" phases=1 bus1="BT4357867545301824MT02.1.2" conn=Delta kv=0.22 pf=1.0 pmpp=5.75 kva=5.0 %pmpp=100 irradiance=0.59 temperature=25 %cutin=0.1 %cutout=0.1 effcurve=Myeff P-TCurve=MyPvsT Daily=PVIrrad_RMTQ1302 TDaily=MyTemp
New "PVsystem.BT_PV16" phases=1 bus1="BT4357867545301824MT02.1.2" conn=Delta kv=0.22 pf=1.0 pmpp=3.45 kva=3.0 %pmpp=100 irradiance=0.59 temperature=25 %cutin=0.1 %cutout=0.1 effcurve=Myeff P-TCurve=MyPvsT Daily=PVIrrad_RMTQ1302 TDaily=MyTemp
New "PVsystem.BT_PV17" phases=3 bus1="BT437272654543887MT02.1.2.3" conn=Delta kv=0.22 pf=1.0 pmpp=9.2 kva=8.0 %pmpp=100 irradiance=0.59 temperature=25 %cutin=0.1 %cutout=0.1 effcurve=Myeff P-TCurve=MyPvsT Daily=PVIrrad_RMTQ1302 TDaily=MyTemp
New "PVsystem.BT_PV18" phases=3 bus1="BT438349445369094MT02.1.2.3" conn=Delta kv=0.22 pf=1.0 pmpp=8.625 kva=7.5 %pmpp=100 irradiance=0.59 temperature=25 %cutin=0.1 %cutout=0.1 effcurve=Myeff P-TCurve=MyPvsT Daily=PVIrrad_RMTQ1302 TDaily=MyTemp
New "PVsystem.BT_PV19" phases=3 bus1="BT437458924530062MT02.1.2.3" conn=Delta kv=0.22 pf=1.0 pmpp=4.6 kva=4.0 %pmpp=100 irradiance=0.59 temperature=25 %cutin=0.1 %cutout=0.1 effcurve=Myeff P-TCurve=MyPvsT Daily=PVIrrad_RMTQ1302 TDaily=MyTemp
New "PVsystem.BT_PV20" phases=3 bus1="BT437458924530062MT02.1.2.3" conn=Delta kv=0.22 pf=1.0 pmpp=10.35 kva=9.0 %pmpp=100 irradiance=0.59 temperature=25 %cutin=0.1 %cutout=0.1 effcurve=Myeff P-TCurve=MyPvsT Daily=PVIrrad_RMTQ1302 TDaily=MyTemp
New "PVsystem.BT_PV21" phases=1 bus1="BT436994024542645MT02.1.2" conn=Delta kv=0.22 pf=1.0 pmpp=4.6 kva=4.0 %pmpp=100 irradiance=0.59 temperature=25 %cutin=0.1 %cutout=0.1 effcurve=Myeff P-TCurve=MyPvsT Daily=PVIrrad_RMTQ1302 TDaily=MyTemp
New "PVsystem.BT_PV22" phases=1 bus1="BT4375470345388879MT02.1.2" conn=Delta kv=0.22 pf=1.0 pmpp=9.2 kva=8.0 %pmpp=100 irradiance=0.59 temperature=25 %cutin=0.1 %cutout=0.1 effcurve=Myeff P-TCurve=MyPvsT Daily=PVIrrad_RMTQ1302 TDaily=MyTemp
New "PVsystem.BT_PV23" phases=3 bus1="BT4375470345388879MT02.1.2.3" conn=Delta kv=0.22 pf=1.0 pmpp=6.9 kva=6.0 %pmpp=100 irradiance=0.59 temperature=25 %cutin=0.1 %cutout=0.1 effcurve=Myeff P-TCurve=MyPvsT Daily=PVIrrad_RMTQ1302 TDaily=MyTemp
New "PVsystem.BT_PV24" phases=3 bus1="BT4382013445368528MT02.1.2.3" conn=Delta kv=0.22 pf=1.0 pmpp=11.5 kva=10.0 %pmpp=100 irradiance=0.59 temperature=25 %cutin=0.1 %cutout=0.1 effcurve=Myeff P-TCurve=MyPvsT Daily=PVIrrad_RMTQ1302 TDaily=MyTemp
New "PVsystem.BT_PV25" phases=3 bus1="BT4382013445368528MT02.1.2.3" conn=Delta kv=0.22 pf=1.0 pmpp=8.05 kva=7.0 %pmpp=100 irradiance=0.59 temperature=25 %cutin=0.1 %cutout=0.1 effcurve=Myeff P-TCurve=MyPvsT Daily=PVIrrad_RMTQ1302 TDaily=MyTemp
New "PVsystem.BT_PV26" phases=3 bus1="BT431576514565412MT02.1.2.3" conn=Delta kv=0.22 pf=1.0 pmpp=23.0 kva=20.0 %pmpp=100 irradiance=0.59 temperature=25 %cutin=0.1 %cutout=0.1 effcurve=Myeff P-TCurve=MyPvsT Daily=PVIrrad_RMTQ1302 TDaily=MyTemp
New "PVsystem.BT_PV27" phases=1 bus1="BT4361929845347146MT02.1.2" conn=Delta kv=0.22 pf=1.0 pmpp=5.75 kva=5.0 %pmpp=100 irradiance=0.59 temperature=25 %cutin=0.1 %cutout=0.1 effcurve=Myeff P-TCurve=MyPvsT Daily=PVIrrad_RMTQ1302 TDaily=MyTemp
New "PVsystem.BT_PV28" phases=3 bus1="BT4371443345447176MT02.1.2.3" conn=Delta kv=0.22 pf=1.0 pmpp=4.6 kva=4.0 %pmpp=100 irradiance=0.59 temperature=25 %cutin=0.1 %cutout=0.1 effcurve=Myeff P-TCurve=MyPvsT Daily=PVIrrad_RMTQ1302 TDaily=MyTemp
New "PVsystem.BT_PV29" phases=3 bus1="BT4371443345447176MT02.1.2.3" conn=Delta kv=0.22 pf=1.0 pmpp=11.5 kva=10.0 %pmpp=100 irradiance=0.59 temperature=25 %cutin=0.1 %cutout=0.1 effcurve=Myeff P-TCurve=MyPvsT Daily=PVIrrad_RMTQ1302 TDaily=MyTemp
New "PVsystem.BT_PV30" phases=3 bus1="BT4382795945354341MT02.1.2.3" conn=Delta kv=0.22 pf=1.0 pmpp=4.6 kva=4.0 %pmpp=100 irradiance=0.59 temperature=25 %cutin=0.1 %cutout=0.1 effcurve=Myeff P-TCurve=MyPvsT Daily=PVIrrad_RMTQ1302 TDaily=MyTemp
New "PVsystem.BT_PV31" phases=3 bus1="BT4382795945354341MT02.1.2.3" conn=Delta kv=0.22 pf=1.0 pmpp=8.05 kva=7.0 %pmpp=100 irradiance=0.59 temperature=25 %cutin=0.1 %cutout=0.1 effcurve=Myeff P-TCurve=MyPvsT Daily=PVIrrad_RMTQ1302 TDaily=MyTemp
New "PVsystem.BT_PV32" phases=3 bus1="BT4382795945354341MT02.1.2.3" conn=Delta kv=0.22 pf=1.0 pmpp=8.05 kva=7.0 %pmpp=100 irradiance=0.59 temperature=25 %cutin=0.1 %cutout=0.1 effcurve=Myeff P-TCurve=MyPvsT Daily=PVIrrad_RMTQ1302 TDaily=MyTemp
New "PVsystem.BT_PV33" phases=1 bus1="BT4355879245313941MT02.2.3" conn=Delta kv=0.22 pf=1.0 pmpp=5.75 kva=5.0 %pmpp=100 irradiance=0.59 temperature=25 %cutin=0.1 %cutout=0.1 effcurve=Myeff P-TCurve=MyPvsT Daily=PVIrrad_RMTQ1302 TDaily=MyTemp
New "PVsystem.BT_PV34" phases=1 bus1="BT4360437645331424MT02.1.2" conn=Delta kv=0.22 pf=1.0 pmpp=5.75 kva=5.0 %pmpp=100 irradiance=0.59 temperature=25 %cutin=0.1 %cutout=0.1 effcurve=Myeff P-TCurve=MyPvsT Daily=PVIrrad_RMTQ1302 TDaily=MyTemp
New "PVsystem.BT_PV35" phases=1 bus1="BT435376784533362MT02.1.2" conn=Delta kv=0.22 pf=1.0 pmpp=6.9 kva=6.0 %pmpp=100 irradiance=0.59 temperature=25 %cutin=0.1 %cutout=0.1 effcurve=Myeff P-TCurve=MyPvsT Daily=PVIrrad_RMTQ1302 TDaily=MyTemp
New "PVsystem.BT_PV36" phases=3 bus1="BT4374736945396739MT02.1.2.3" conn=Delta kv=0.22 pf=1.0 pmpp=9.2 kva=8.0 %pmpp=100 irradiance=0.59 temperature=25 %cutin=0.1 %cutout=0.1 effcurve=Myeff P-TCurve=MyPvsT Daily=PVIrrad_RMTQ1302 TDaily=MyTemp
New "PVsystem.BT_PV37" phases=3 bus1="BT4349009545389191MT02.1.2.3" conn=Delta kv=0.22 pf=1.0 pmpp=23.0 kva=20.0 %pmpp=100 irradiance=0.59 temperature=25 %cutin=0.1 %cutout=0.1 effcurve=Myeff P-TCurve=MyPvsT Daily=PVIrrad_RMTQ1302 TDaily=MyTemp
New "PVsystem.BT_PV38" phases=1 bus1="BT4349009545389191MT02.2.3" conn=Delta kv=0.22 pf=1.0 pmpp=2.691 kva=2.34 %pmpp=100 irradiance=0.59 temperature=25 %cutin=0.1 %cutout=0.1 effcurve=Myeff P-TCurve=MyPvsT Daily=PVIrrad_RMTQ1302 TDaily=MyTemp
New "PVsystem.BT_PV39" phases=3 bus1="BT4308283445603856MT02.1.2.3" conn=Delta kv=0.22 pf=1.0 pmpp=34.5 kva=30.0 %pmpp=100 irradiance=0.59 temperature=25 %cutin=0.1 %cutout=0.1 effcurve=Myeff P-TCurve=MyPvsT Daily=PVIrrad_RMTQ1302 TDaily=MyTemp
New "PVsystem.BT_PV40" phases=1 bus1="BT4369259845438267MT02.1.2" conn=Delta kv=0.22 pf=1.0 pmpp=5.75 kva=5.0 %pmpp=100 irradiance=0.59 temperature=25 %cutin=0.1 %cutout=0.1 effcurve=Myeff P-TCurve=MyPvsT Daily=PVIrrad_RMTQ1302 TDaily=MyTemp
New "PVsystem.BT_PV41" phases=3 bus1="BT4383517845354833MT02.1.2.3" conn=Delta kv=0.22 pf=1.0 pmpp=6.21 kva=5.4 %pmpp=100 irradiance=0.59 temperature=25 %cutin=0.1 %cutout=0.1 effcurve=Myeff P-TCurve=MyPvsT Daily=PVIrrad_RMTQ1302 TDaily=MyTemp


!New "PVsystem.BT_PV42" phases=3 bus1="BT4313102645859803MT02.1.2.3" conn=Delta kv=0.24 pf=1.0 pmpp=13.8 kva=12.0 %pmpp=100 irradiance=0.59 temperature=25 %cutin=0.1 %cutout=0.1 effcurve=Myeff P-TCurve=MyPvsT Daily=PVIrrad_RMTQ1302 TDaily=MyTemp


New "PVsystem.BT_PV43" phases=3 bus1="BT4312556245632871MT02.1.2.3" conn=Delta kv=0.22 pf=1.0 pmpp=5.75 kva=5.0 %pmpp=100 irradiance=0.59 temperature=25 %cutin=0.1 %cutout=0.1 effcurve=Myeff P-TCurve=MyPvsT Daily=PVIrrad_RMTQ1302 TDaily=MyTemp
New "PVsystem.BT_PV44" phases=1 bus1="BT4312556245632871MT02.1.2" conn=Delta kv=0.22 pf=1.0 pmpp=17.25 kva=15.0 %pmpp=100 irradiance=0.59 temperature=25 %cutin=0.1 %cutout=0.1 effcurve=Myeff P-TCurve=MyPvsT Daily=PVIrrad_RMTQ1302 TDaily=MyTemp
New "PVsystem.BT_PV45" phases=3 bus1="BT4300377645515507MT02.1.2.3" conn=Delta kv=0.22 pf=1.0 pmpp=20.7 kva=18.0 %pmpp=100 irradiance=0.59 temperature=25 %cutin=0.1 %cutout=0.1 effcurve=Myeff P-TCurve=MyPvsT Daily=PVIrrad_RMTQ1302 TDaily=MyTemp
New "PVsystem.BT_PV46" phases=3 bus1="BT4374395545312223MT02.1.2.3" conn=Delta kv=0.22 pf=1.0 pmpp=5.175 kva=4.5 %pmpp=100 irradiance=0.59 temperature=25 %cutin=0.1 %cutout=0.1 effcurve=Myeff P-TCurve=MyPvsT Daily=PVIrrad_RMTQ1302 TDaily=MyTemp
New "PVsystem.BT_PV47" phases=3 bus1="BT4374395545312223MT02.1.2.3" conn=Delta kv=0.22 pf=1.0 pmpp=4.6 kva=4.0 %pmpp=100 irradiance=0.59 temperature=25 %cutin=0.1 %cutout=0.1 effcurve=Myeff P-TCurve=MyPvsT Daily=PVIrrad_RMTQ1302 TDaily=MyTemp
New "PVsystem.BT_PV48" phases=3 bus1="BT4276710745146048MT02.1.2.3" conn=Delta kv=0.22 pf=1.0 pmpp=23.287 kva=20.25 %pmpp=100 irradiance=0.59 temperature=25 %cutin=0.1 %cutout=0.1 effcurve=Myeff P-TCurve=MyPvsT Daily=PVIrrad_RMTQ1302 TDaily=MyTemp
New "PVsystem.BT_PV49" phases=3 bus1="BT4373407545300191MT02.1.2.3" conn=Delta kv=0.22 pf=1.0 pmpp=6.9 kva=6.0 %pmpp=100 irradiance=0.59 temperature=25 %cutin=0.1 %cutout=0.1 effcurve=Myeff P-TCurve=MyPvsT Daily=PVIrrad_RMTQ1302 TDaily=MyTemp
New "PVsystem.BT_PV50" phases=1 bus1="BT4355687745321721MT02.1.2" conn=Delta kv=0.22 pf=1.0 pmpp=4.6 kva=4.0 %pmpp=100 irradiance=0.59 temperature=25 %cutin=0.1 %cutout=0.1 effcurve=Myeff P-TCurve=MyPvsT Daily=PVIrrad_RMTQ1302 TDaily=MyTemp
New "PVsystem.BT_PV51" phases=3 bus1="BT4376689545385462MT02.1.2.3" conn=Delta kv=0.22 pf=1.0 pmpp=11.5 kva=10.0 %pmpp=100 irradiance=0.59 temperature=25 %cutin=0.1 %cutout=0.1 effcurve=Myeff P-TCurve=MyPvsT Daily=PVIrrad_RMTQ1302 TDaily=MyTemp
New "PVsystem.BT_PV52" phases=1 bus1="BT435780784533712MT02.1.3" conn=Delta kv=0.22 pf=1.0 pmpp=5.75 kva=5.0 %pmpp=100 irradiance=0.59 temperature=25 %cutin=0.1 %cutout=0.1 effcurve=Myeff P-TCurve=MyPvsT Daily=PVIrrad_RMTQ1302 TDaily=MyTemp
New "PVsystem.BT_PV53" phases=1 bus1="BT431107245696223MT02.1.2" conn=Delta kv=0.24 pf=1.0 pmpp=5.75 kva=5.0 %pmpp=100 irradiance=0.59 temperature=25 %cutin=0.1 %cutout=0.1 effcurve=Myeff P-TCurve=MyPvsT Daily=PVIrrad_RMTQ1302 TDaily=MyTemp
New "PVsystem.BT_PV54" phases=1 bus1="BT434703545400849MT02.1.2" conn=Delta kv=0.22 pf=1.0 pmpp=80.5 kva=70.0 %pmpp=100 irradiance=0.59 temperature=25 %cutin=0.1 %cutout=0.1 effcurve=Myeff P-TCurve=MyPvsT Daily=PVIrrad_RMTQ1302 TDaily=MyTemp
