! DU_7_GeradoresBT_391_MTQ_RMTQ1302
New XYCurve.MyPvsT npts=4 xarray=[0  25  75  100]  yarray=[1.2  1.0  0.8  0.6]
New XYCurve.MyEff npts=4 xarray=[0.1  0.2  0.4  1.0]  yarray=[0.86  0.9  0.93  0.97]
!New Tshape.MyTemp npts=24 interval=1 temp=[12.95, 12.47, 12.07, 11.72, 11.5, 11.22, 10.97, 11.23, 16.5, 23.8, 29.68, 34.09, 36.84, 36.83, 34.93, 31.29, 26.34, 20.82, 18.15, 16.85, 15.82, 14.93, 14.15, 13.49]
!New Loadshape.PVIrrad_RMTQ1302 24 1.0 mult=[0.0, 0.0, 0.0, 0.0, 0.0, 0.0, 0.0, 0.02735, 0.263556, 0.51458, 0.739019, 0.906618, 1.0, 0.953134, 0.81817, 0.601997, 0.332818, 0.066603, 0.0, 0.0, 0.0, 0.0, 0.0, 0.0]

New "PVsystem.BT_a5a938a878b372554148d7ed5458a64d9a285e90f511eeb713d7ef88a73459f4_M1" phases=1 bus1="BT1001923285.1.2.4" conn=Delta kv=0.24 pf=1.0 pmpp=1.020 kva=0.887 %pmpp=100 irradiance=0.59 temperature=25 %cutin=0.1 %cutout=0.1 effcurve=Myeff P-TCurve=MyPvsT Daily=PVIrrad_RMTQ1302 TDaily=MyTemp
!New "PVsystem.BT_781fd570a777db929a4ff310cfb4dd50111246247a2527bc4c989e75460c05ad_M1" phases=1 bus1="BT1002214036.1.2.4" conn=Delta kv=0.22 pf=1.0 pmpp=0.000 kva=0.000 %pmpp=100 irradiance=0.59 temperature=25 %cutin=0.1 %cutout=0.1 effcurve=Myeff P-TCurve=MyPvsT Daily=PVIrrad_RMTQ1302 TDaily=MyTemp
!New "PVsystem.BT_667ce1fa4be76b5ce74a1f00e8eab57c37755f91ed9145f2063cd93a7feddafa_M1" phases=1 bus1="BT1001734424.1.2.4" conn=Delta kv=0.22 pf=1.0 pmpp=0.000 kva=0.000 %pmpp=100 irradiance=0.59 temperature=25 %cutin=0.1 %cutout=0.1 effcurve=Myeff P-TCurve=MyPvsT Daily=PVIrrad_RMTQ1302 TDaily=MyTemp
New "PVsystem.BT_611521411f0f38a613a02b2855fd4003a92ea37950c46b1da46c08529f38041d_M1" phases=1 bus1="BT1001321450.3.1.4" conn=Delta kv=0.22 pf=1.0 pmpp=0.051 kva=0.044 %pmpp=100 irradiance=0.59 temperature=25 %cutin=0.1 %cutout=0.1 effcurve=Myeff P-TCurve=MyPvsT Daily=PVIrrad_RMTQ1302 TDaily=MyTemp
!New "PVsystem.BT_b0c367625c14184f09f6ab62a5dbdc9a57aad8fae5e4ef7cb745df2654e03b2a_M1" phases=1 bus1="BT1001788241.1.2.4" conn=Delta kv=0.24 pf=1.0 pmpp=0.000 kva=0.000 %pmpp=100 irradiance=0.59 temperature=25 %cutin=0.1 %cutout=0.1 effcurve=Myeff P-TCurve=MyPvsT Daily=PVIrrad_RMTQ1302 TDaily=MyTemp
New "PVsystem.BT_fe9d0c3769368313045a3d07b99b43842e72e123d436475521de4f7787bbaf6a_M1" phases=1 bus1="BT1000779823.1.2.4" conn=Delta kv=0.22 pf=1.0 pmpp=0.084 kva=0.073 %pmpp=100 irradiance=0.59 temperature=25 %cutin=0.1 %cutout=0.1 effcurve=Myeff P-TCurve=MyPvsT Daily=PVIrrad_RMTQ1302 TDaily=MyTemp
New "PVsystem.BT_a22c036af9f3fe3e5d66015078a7180adb461ee880567c71e762d50d9fe638d1_M1" phases=1 bus1="BT1002102593.1.2.4" conn=Delta kv=0.24 pf=1.0 pmpp=1.059 kva=0.920 %pmpp=100 irradiance=0.59 temperature=25 %cutin=0.1 %cutout=0.1 effcurve=Myeff P-TCurve=MyPvsT Daily=PVIrrad_RMTQ1302 TDaily=MyTemp
New "PVsystem.BT_0914838fafc59619e741c3840ab65e177a905c5f0e28a5efc8e2ec3b4e3db2dd_M1" phases=3 bus1="BT1000779696.1.2.3.4" conn=Delta kv=0.22 pf=1.0 pmpp=4.452 kva=3.872 %pmpp=100 irradiance=0.59 temperature=25 %cutin=0.1 %cutout=0.1 effcurve=Myeff P-TCurve=MyPvsT Daily=PVIrrad_RMTQ1302 TDaily=MyTemp
New "PVsystem.BT_ff4e653cb45e6146d685274b1e03fdc2715daf7b9ddc57abb0455e8efc88371c_M1" phases=3 bus1="BT1002114559.1.2.3.4" conn=Delta kv=0.22 pf=1.0 pmpp=3.351 kva=2.914 %pmpp=100 irradiance=0.59 temperature=25 %cutin=0.1 %cutout=0.1 effcurve=Myeff P-TCurve=MyPvsT Daily=PVIrrad_RMTQ1302 TDaily=MyTemp
New "PVsystem.BT_3797aba1e5407ad935e4a3a84ca47b43454f9723d778a500e36c1c9829470cf3_M1" phases=1 bus1="BT1001119552.2.3.4" conn=Delta kv=0.22 pf=1.0 pmpp=0.256 kva=0.223 %pmpp=100 irradiance=0.59 temperature=25 %cutin=0.1 %cutout=0.1 effcurve=Myeff P-TCurve=MyPvsT Daily=PVIrrad_RMTQ1302 TDaily=MyTemp
New "PVsystem.BT_863d7dff65bca56741e9a58be6ac591017ed36dd6cf51c243fe22075c67bede4_M1" phases=1 bus1="BT1001119563.1.2.4" conn=Delta kv=0.22 pf=1.0 pmpp=0.513 kva=0.446 %pmpp=100 irradiance=0.59 temperature=25 %cutin=0.1 %cutout=0.1 effcurve=Myeff P-TCurve=MyPvsT Daily=PVIrrad_RMTQ1302 TDaily=MyTemp
!New "PVsystem.BT_5877dbb426290628b4d0c62024c995092c89838ab56656c3eaf623c0737d2d84_M1" phases=1 bus1="BT1000928312.1.2.4" conn=Delta kv=0.22 pf=1.0 pmpp=0.000 kva=0.000 %pmpp=100 irradiance=0.59 temperature=25 %cutin=0.1 %cutout=0.1 effcurve=Myeff P-TCurve=MyPvsT Daily=PVIrrad_RMTQ1302 TDaily=MyTemp
New "PVsystem.BT_45086f0148183cd1a54d76d8d34adaf0fbbfb29746a415cd495012f600fdf6e4_M1" phases=1 bus1="BT1001119799.2.3.4" conn=Delta kv=0.22 pf=1.0 pmpp=0.838 kva=0.728 %pmpp=100 irradiance=0.59 temperature=25 %cutin=0.1 %cutout=0.1 effcurve=Myeff P-TCurve=MyPvsT Daily=PVIrrad_RMTQ1302 TDaily=MyTemp
New "PVsystem.BT_993a156bc8f359c5e5040e0e3dcc8a033d5b3031dc8e7ff4f112f4235c4bfdc3_M1" phases=3 bus1="BT1000953444.1.2.3.4" conn=Delta kv=0.22 pf=1.0 pmpp=0.891 kva=0.775 %pmpp=100 irradiance=0.59 temperature=25 %cutin=0.1 %cutout=0.1 effcurve=Myeff P-TCurve=MyPvsT Daily=PVIrrad_RMTQ1302 TDaily=MyTemp
New "PVsystem.BT_a9c968e14e7b7a5fb6bf42cad60c3e8fe50df1f1e9d2e15e201b416dcd156d0f_M1" phases=1 bus1="BT1001119848.3.1.4" conn=Delta kv=0.22 pf=1.0 pmpp=0.937 kva=0.814 %pmpp=100 irradiance=0.59 temperature=25 %cutin=0.1 %cutout=0.1 effcurve=Myeff P-TCurve=MyPvsT Daily=PVIrrad_RMTQ1302 TDaily=MyTemp
New "PVsystem.BT_f1ff5f5bf431a61eb9c4123c6d18806c29259b7a798df1a53c33b97b8150e036_M1" phases=1 bus1="BT1001119833.1.2.4" conn=Delta kv=0.22 pf=1.0 pmpp=0.668 kva=0.581 %pmpp=100 irradiance=0.59 temperature=25 %cutin=0.1 %cutout=0.1 effcurve=Myeff P-TCurve=MyPvsT Daily=PVIrrad_RMTQ1302 TDaily=MyTemp
New "PVsystem.BT_03a1913a8728f4f542b30c157bdae136d0be5d405310e62ac6711d86e93b865a_M1" phases=1 bus1="BT1001119836.2.3.4" conn=Delta kv=0.22 pf=1.0 pmpp=0.655 kva=0.569 %pmpp=100 irradiance=0.59 temperature=25 %cutin=0.1 %cutout=0.1 effcurve=Myeff P-TCurve=MyPvsT Daily=PVIrrad_RMTQ1302 TDaily=MyTemp
!New "PVsystem.BT_8e113b0af758cf16eb05d608adccac48d5add105a28dca23d5397c709146fb3d_M1" phases=3 bus1="BT1002118083.1.2.3.4" conn=Delta kv=0.22 pf=1.0 pmpp=0.000 kva=0.000 %pmpp=100 irradiance=0.59 temperature=25 %cutin=0.1 %cutout=0.1 effcurve=Myeff P-TCurve=MyPvsT Daily=PVIrrad_RMTQ1302 TDaily=MyTemp
New "PVsystem.BT_232c84f9bfd50bdb7ef8877276895fae492eb98cedc15e4a89f2232c41862332_M1" phases=3 bus1="BT1001119873.1.2.3.4" conn=Delta kv=0.22 pf=1.0 pmpp=1.871 kva=1.627 %pmpp=100 irradiance=0.59 temperature=25 %cutin=0.1 %cutout=0.1 effcurve=Myeff P-TCurve=MyPvsT Daily=PVIrrad_RMTQ1302 TDaily=MyTemp
!New "PVsystem.BT_4190fa8b39447f175a9192025164aa633dc27380818759e95e998c3ff9009b18_M1" phases=3 bus1="BT1000948073.1.2.3.4" conn=Delta kv=0.22 pf=1.0 pmpp=0.000 kva=0.000 %pmpp=100 irradiance=0.59 temperature=25 %cutin=0.1 %cutout=0.1 effcurve=Myeff P-TCurve=MyPvsT Daily=PVIrrad_RMTQ1302 TDaily=MyTemp
New "PVsystem.BT_a80c4822d69e0c52d141a9d99eb0fd21257aaa882e9539aa065d48b5e2f2e73f_M1" phases=1 bus1="BT1002042645.1.2.4" conn=Delta kv=0.22 pf=1.0 pmpp=1.815 kva=1.578 %pmpp=100 irradiance=0.59 temperature=25 %cutin=0.1 %cutout=0.1 effcurve=Myeff P-TCurve=MyPvsT Daily=PVIrrad_RMTQ1302 TDaily=MyTemp
New "PVsystem.BT_280619225c4611b56eba9dcf2c5780713a6e4d014f7c6e27f63844e0c4e9850d_M1" phases=3 bus1="BT1001194676.1.2.3.4" conn=Delta kv=0.22 pf=1.0 pmpp=0.840 kva=0.731 %pmpp=100 irradiance=0.59 temperature=25 %cutin=0.1 %cutout=0.1 effcurve=Myeff P-TCurve=MyPvsT Daily=PVIrrad_RMTQ1302 TDaily=MyTemp
New "PVsystem.BT_cac06391a3c93a589ec6e39d1f3ebae348286367ceec1803ac9e8afcf523733a_M1" phases=1 bus1="BT1000948233.2.3.4" conn=Delta kv=0.22 pf=1.0 pmpp=0.701 kva=0.609 %pmpp=100 irradiance=0.59 temperature=25 %cutin=0.1 %cutout=0.1 effcurve=Myeff P-TCurve=MyPvsT Daily=PVIrrad_RMTQ1302 TDaily=MyTemp
!New "PVsystem.BT_60901c112119d823288c24f70d99c26ca9b5a0ec95359fd611c5b58fff725a7a_M1" phases=1 bus1="BT1000953630.1.2.4" conn=Delta kv=0.22 pf=1.0 pmpp=0.000 kva=0.000 %pmpp=100 irradiance=0.59 temperature=25 %cutin=0.1 %cutout=0.1 effcurve=Myeff P-TCurve=MyPvsT Daily=PVIrrad_RMTQ1302 TDaily=MyTemp
!New "PVsystem.BT_577602039e2c74fc90b6e7c5b03760ca7422f840fd427b872f03e09f8e869298_M1" phases=1 bus1="BT1001223057.1.2.4" conn=Delta kv=0.22 pf=1.0 pmpp=0.000 kva=0.000 %pmpp=100 irradiance=0.59 temperature=25 %cutin=0.1 %cutout=0.1 effcurve=Myeff P-TCurve=MyPvsT Daily=PVIrrad_RMTQ1302 TDaily=MyTemp
!New "PVsystem.BT_d1d9551dffce8ae3dd80df45165e581bab737762e4591691944c9fc8ab51d1a4_M1" phases=3 bus1="BT1000870458.1.2.3.4" conn=Delta kv=0.22 pf=1.0 pmpp=0.000 kva=0.000 %pmpp=100 irradiance=0.59 temperature=25 %cutin=0.1 %cutout=0.1 effcurve=Myeff P-TCurve=MyPvsT Daily=PVIrrad_RMTQ1302 TDaily=MyTemp
New "PVsystem.BT_0bdd4db3e193afc0f43060eabc498286c0cbef758eb776d41a4cb0ce1d61a0ed_M1" phases=3 bus1="BT1000953465.1.2.3.4" conn=Delta kv=0.22 pf=1.0 pmpp=0.731 kva=0.636 %pmpp=100 irradiance=0.59 temperature=25 %cutin=0.1 %cutout=0.1 effcurve=Myeff P-TCurve=MyPvsT Daily=PVIrrad_RMTQ1302 TDaily=MyTemp
!New "PVsystem.BT_4f98bdb120504699dadc9a59dff9eec8b9e785e295cb5a5cc2a878f796da1dc7_M1" phases=3 bus1="BT1000953482.1.2.3.4" conn=Delta kv=0.22 pf=1.0 pmpp=0.000 kva=0.000 %pmpp=100 irradiance=0.59 temperature=25 %cutin=0.1 %cutout=0.1 effcurve=Myeff P-TCurve=MyPvsT Daily=PVIrrad_RMTQ1302 TDaily=MyTemp
New "PVsystem.BT_b28627cb4dc9021fbc0cab1d5a2e11166a3ec1634ac2db03506f32c3fb4f11db_M1" phases=1 bus1="BT1000953482.2.3.4" conn=Delta kv=0.22 pf=1.0 pmpp=0.906 kva=0.788 %pmpp=100 irradiance=0.59 temperature=25 %cutin=0.1 %cutout=0.1 effcurve=Myeff P-TCurve=MyPvsT Daily=PVIrrad_RMTQ1302 TDaily=MyTemp
New "PVsystem.BT_3d81d879c27e703d1284c41823703c7e36179321a63fa0bde723d219f67976c2_M1" phases=1 bus1="BT1000953482.1.2.4" conn=Delta kv=0.22 pf=1.0 pmpp=0.665 kva=0.578 %pmpp=100 irradiance=0.59 temperature=25 %cutin=0.1 %cutout=0.1 effcurve=Myeff P-TCurve=MyPvsT Daily=PVIrrad_RMTQ1302 TDaily=MyTemp
New "PVsystem.BT_b8596fd86ef836511e2a3e2ecaf74fdd2f25e6d09f76f45564aa3a94ebf2d7b7_M1" phases=3 bus1="BT1002204187.1.2.3.4" conn=Delta kv=0.22 pf=1.0 pmpp=0.909 kva=0.790 %pmpp=100 irradiance=0.59 temperature=25 %cutin=0.1 %cutout=0.1 effcurve=Myeff P-TCurve=MyPvsT Daily=PVIrrad_RMTQ1302 TDaily=MyTemp
New "PVsystem.BT_ca5bca0d9c5e1c7ba408bf1ec95addcd70c22b880b7a8a525b56f6b45914a3fd_M1" phases=3 bus1="BT1001972452.1.2.3.4" conn=Delta kv=0.22 pf=1.0 pmpp=1.269 kva=1.104 %pmpp=100 irradiance=0.59 temperature=25 %cutin=0.1 %cutout=0.1 effcurve=Myeff P-TCurve=MyPvsT Daily=PVIrrad_RMTQ1302 TDaily=MyTemp
New "PVsystem.BT_c74990018cfe7a336843b7cceef56c49817ddc956c8a9cd641ec0eaffe619178_M1" phases=1 bus1="BT1001328113.3.1.4" conn=Delta kv=0.22 pf=1.0 pmpp=0.838 kva=0.728 %pmpp=100 irradiance=0.59 temperature=25 %cutin=0.1 %cutout=0.1 effcurve=Myeff P-TCurve=MyPvsT Daily=PVIrrad_RMTQ1302 TDaily=MyTemp
New "PVsystem.BT_b69b931f4acbd8cd304cb998eabcbafd2aa8e585d1f3f6318bb0ef26f323c9a2_M1" phases=1 bus1="BT1000870612.3.1.4" conn=Delta kv=0.22 pf=1.0 pmpp=0.617 kva=0.536 %pmpp=100 irradiance=0.59 temperature=25 %cutin=0.1 %cutout=0.1 effcurve=Myeff P-TCurve=MyPvsT Daily=PVIrrad_RMTQ1302 TDaily=MyTemp
!New "PVsystem.BT_3eaf6ecf4798d5ebd21604464fae074ddb0dfbe74088287495005d828cb5e952_M1" phases=1 bus1="BT1000948150.3.1.4" conn=Delta kv=0.22 pf=1.0 pmpp=0.000 kva=0.000 %pmpp=100 irradiance=0.59 temperature=25 %cutin=0.1 %cutout=0.1 effcurve=Myeff P-TCurve=MyPvsT Daily=PVIrrad_RMTQ1302 TDaily=MyTemp
New "PVsystem.BT_2481a914000941a762b598a13d2c8a697fca56713012ee2ce84cb17072713082_M1" phases=1 bus1="BT1000948163.3.1.4" conn=Delta kv=0.22 pf=1.0 pmpp=6.191 kva=5.384 %pmpp=100 irradiance=0.59 temperature=25 %cutin=0.1 %cutout=0.1 effcurve=Myeff P-TCurve=MyPvsT Daily=PVIrrad_RMTQ1302 TDaily=MyTemp
New "PVsystem.BT_9dc960413fefbec00a8d3d108e56b03e9870e8a4b10cc1a8db46f0853fe0c78f_M1" phases=1 bus1="BT1000893998.1.2.4" conn=Delta kv=0.22 pf=1.0 pmpp=0.574 kva=0.499 %pmpp=100 irradiance=0.59 temperature=25 %cutin=0.1 %cutout=0.1 effcurve=Myeff P-TCurve=MyPvsT Daily=PVIrrad_RMTQ1302 TDaily=MyTemp
New "PVsystem.BT_dc4eb76d0dc7f26f0fbae1265d8e1843a747c662bb370afe3371a76de48345fd_M1" phases=3 bus1="BT1000876836.1.2.3.4" conn=Delta kv=0.22 pf=1.0 pmpp=0.292 kva=0.254 %pmpp=100 irradiance=0.59 temperature=25 %cutin=0.1 %cutout=0.1 effcurve=Myeff P-TCurve=MyPvsT Daily=PVIrrad_RMTQ1302 TDaily=MyTemp
New "PVsystem.BT_3538987e5544c0856be7ee0cc756526c2b8431d6b18e4330e069dea563f86ba7_M1" phases=1 bus1="BT1000882134.1.2.4" conn=Delta kv=0.22 pf=1.0 pmpp=0.916 kva=0.797 %pmpp=100 irradiance=0.59 temperature=25 %cutin=0.1 %cutout=0.1 effcurve=Myeff P-TCurve=MyPvsT Daily=PVIrrad_RMTQ1302 TDaily=MyTemp
New "PVsystem.BT_d59d49ea987edb78a1d990812afe5b30c0569c4d130e9bf9e585aa3f010a6b39_M1" phases=1 bus1="BT1002153502.1.2.4" conn=Delta kv=0.22 pf=1.0 pmpp=2.320 kva=2.017 %pmpp=100 irradiance=0.59 temperature=25 %cutin=0.1 %cutout=0.1 effcurve=Myeff P-TCurve=MyPvsT Daily=PVIrrad_RMTQ1302 TDaily=MyTemp
New "PVsystem.BT_73fe66710b80b2d8e48f0f4e8355e9bb965c71523110a68c8498a5ee354773f0_M1" phases=1 bus1="BT1000894014.2.3.4" conn=Delta kv=0.22 pf=1.0 pmpp=0.635 kva=0.552 %pmpp=100 irradiance=0.59 temperature=25 %cutin=0.1 %cutout=0.1 effcurve=Myeff P-TCurve=MyPvsT Daily=PVIrrad_RMTQ1302 TDaily=MyTemp
New "PVsystem.BT_5bf493e950cfbcad9c85d5e17973b83ccc072f1cc5956e61ac1e448a4e2be6f9_M1" phases=1 bus1="BT1002173349.3.1.4" conn=Delta kv=0.22 pf=1.0 pmpp=0.538 kva=0.468 %pmpp=100 irradiance=0.59 temperature=25 %cutin=0.1 %cutout=0.1 effcurve=Myeff P-TCurve=MyPvsT Daily=PVIrrad_RMTQ1302 TDaily=MyTemp
New "PVsystem.BT_2921b0ce13f616756595d651cf1b410fe3996e259023f7bccfdb1aff7e68e92a_M1" phases=1 bus1="BT1001694899.1.2.4" conn=Delta kv=0.22 pf=1.0 pmpp=0.853 kva=0.742 %pmpp=100 irradiance=0.59 temperature=25 %cutin=0.1 %cutout=0.1 effcurve=Myeff P-TCurve=MyPvsT Daily=PVIrrad_RMTQ1302 TDaily=MyTemp
New "PVsystem.BT_f893b344dc040fe1a7e6f545fde52cab9fafa2efe0a5bb536a9611d157e73104_M1" phases=1 bus1="BT1000870744.3.1.4" conn=Delta kv=0.22 pf=1.0 pmpp=0.805 kva=0.700 %pmpp=100 irradiance=0.59 temperature=25 %cutin=0.1 %cutout=0.1 effcurve=Myeff P-TCurve=MyPvsT Daily=PVIrrad_RMTQ1302 TDaily=MyTemp
New "PVsystem.BT_9c4040229ae3289d8c9edca59a883797f74578f8d43674879497f27a7390e8e6_M1" phases=1 bus1="BT1000888481.3.1.4" conn=Delta kv=0.22 pf=1.0 pmpp=0.015 kva=0.013 %pmpp=100 irradiance=0.59 temperature=25 %cutin=0.1 %cutout=0.1 effcurve=Myeff P-TCurve=MyPvsT Daily=PVIrrad_RMTQ1302 TDaily=MyTemp
New "PVsystem.BT_2906fb94ccb0cfc505b29c91accf1d757c624f48f53ba9362468a4771bc5ed1e_M1" phases=1 bus1="BT1000869646.1.2.4" conn=Delta kv=0.22 pf=1.0 pmpp=0.756 kva=0.658 %pmpp=100 irradiance=0.59 temperature=25 %cutin=0.1 %cutout=0.1 effcurve=Myeff P-TCurve=MyPvsT Daily=PVIrrad_RMTQ1302 TDaily=MyTemp
New "PVsystem.BT_e86c3fff02640db4906170205331e842ea8901a35dfba9904a9ba770482534c6_M1" phases=1 bus1="BT1000870865.1.2.4" conn=Delta kv=0.22 pf=1.0 pmpp=0.782 kva=0.680 %pmpp=100 irradiance=0.59 temperature=25 %cutin=0.1 %cutout=0.1 effcurve=Myeff P-TCurve=MyPvsT Daily=PVIrrad_RMTQ1302 TDaily=MyTemp
!New "PVsystem.BT_41c77b7b1a0c0bf1b0185b23afc8b095f4a3e219bec267a8cb27ea83f33d30dd_M1" phases=3 bus1="BT1000870884.1.2.3.4" conn=Delta kv=0.24 pf=1.0 pmpp=0.000 kva=0.000 %pmpp=100 irradiance=0.59 temperature=25 %cutin=0.1 %cutout=0.1 effcurve=Myeff P-TCurve=MyPvsT Daily=PVIrrad_RMTQ1302 TDaily=MyTemp
!New "PVsystem.BT_350ae9960a3a74a79366916bcd0d9499fb7b4e3cb0ea7964bc972cf8133fc165_M1" phases=3 bus1="BT1000870890.1.2.3.4" conn=Delta kv=0.22 pf=1.0 pmpp=0.000 kva=0.000 %pmpp=100 irradiance=0.59 temperature=25 %cutin=0.1 %cutout=0.1 effcurve=Myeff P-TCurve=MyPvsT Daily=PVIrrad_RMTQ1302 TDaily=MyTemp
!New "PVsystem.BT_7e2b1d2e586b214cbf0fe5faad51d45e5f954ba66261abc1492bfa4c82964cfc_M1" phases=1 bus1="BT1001921375.1.2.4" conn=Delta kv=0.22 pf=1.0 pmpp=0.000 kva=0.000 %pmpp=100 irradiance=0.59 temperature=25 %cutin=0.1 %cutout=0.1 effcurve=Myeff P-TCurve=MyPvsT Daily=PVIrrad_RMTQ1302 TDaily=MyTemp
New "PVsystem.BT_f4efc54f61609f995b16d12b8801e05314048aa8eb2cce92dde280b3d133e383_M1" phases=3 bus1="BT1000876510.1.2.3.4" conn=Delta kv=0.22 pf=1.0 pmpp=0.655 kva=0.569 %pmpp=100 irradiance=0.59 temperature=25 %cutin=0.1 %cutout=0.1 effcurve=Myeff P-TCurve=MyPvsT Daily=PVIrrad_RMTQ1302 TDaily=MyTemp
New "PVsystem.BT_26509010173d9a7a473eceb67ba31a8eada90c19ae9a1184d204a7f74c501928_M1" phases=1 bus1="BT1000876606.1.2.4" conn=Delta kv=0.22 pf=1.0 pmpp=1.117 kva=0.971 %pmpp=100 irradiance=0.59 temperature=25 %cutin=0.1 %cutout=0.1 effcurve=Myeff P-TCurve=MyPvsT Daily=PVIrrad_RMTQ1302 TDaily=MyTemp
!New "PVsystem.BT_339366525eed6e9b99f5275b7ce880ae93be37587361deea13eccf526a5d30cd_M1" phases=3 bus1="BT1000876457.1.2.3.4" conn=Delta kv=0.22 pf=1.0 pmpp=0.000 kva=0.000 %pmpp=100 irradiance=0.59 temperature=25 %cutin=0.1 %cutout=0.1 effcurve=Myeff P-TCurve=MyPvsT Daily=PVIrrad_RMTQ1302 TDaily=MyTemp
New "PVsystem.BT_08e926ed978646631035ad38054546dd56f6df0f2e11f69e8aae1c4b1db1a247_M1" phases=1 bus1="BT1001124986.3.1.4" conn=Delta kv=0.22 pf=1.0 pmpp=0.444 kva=0.386 %pmpp=100 irradiance=0.59 temperature=25 %cutin=0.1 %cutout=0.1 effcurve=Myeff P-TCurve=MyPvsT Daily=PVIrrad_RMTQ1302 TDaily=MyTemp
New "PVsystem.BT_c6d5fe63e197c831850cc9b3d29591d3d20d3d5a75fc7691a9a992c8331753e1_M1" phases=1 bus1="BT1000953580.2.3.4" conn=Delta kv=0.22 pf=1.0 pmpp=0.538 kva=0.468 %pmpp=100 irradiance=0.59 temperature=25 %cutin=0.1 %cutout=0.1 effcurve=Myeff P-TCurve=MyPvsT Daily=PVIrrad_RMTQ1302 TDaily=MyTemp
New "PVsystem.BT_ec2216f1cee34a4a02cd37a1e7483ce7de7a48ea7fea4d0a5d35954698bdc43f_M1" phases=1 bus1="BT1001260057.1.2.4" conn=Delta kv=0.22 pf=1.0 pmpp=0.660 kva=0.574 %pmpp=100 irradiance=0.59 temperature=25 %cutin=0.1 %cutout=0.1 effcurve=Myeff P-TCurve=MyPvsT Daily=PVIrrad_RMTQ1302 TDaily=MyTemp
New "PVsystem.BT_081b55d4b79e07edb7feb064c3c6ce2fc575359e8ffe96390d09c284749361a6_M1" phases=1 bus1="BT1000953528.2.3.4" conn=Delta kv=0.22 pf=1.0 pmpp=0.673 kva=0.585 %pmpp=100 irradiance=0.59 temperature=25 %cutin=0.1 %cutout=0.1 effcurve=Myeff P-TCurve=MyPvsT Daily=PVIrrad_RMTQ1302 TDaily=MyTemp
New "PVsystem.BT_a36100c46965392bfe5440839ad315da2a802827095e19bd397d6d45c7c5f0c4_M1" phases=3 bus1="BT1001995973.1.2.3.4" conn=Delta kv=0.22 pf=1.0 pmpp=1.904 kva=1.655 %pmpp=100 irradiance=0.59 temperature=25 %cutin=0.1 %cutout=0.1 effcurve=Myeff P-TCurve=MyPvsT Daily=PVIrrad_RMTQ1302 TDaily=MyTemp
New "PVsystem.BT_1a8fcf032075847f74b1427792b539df4d34402da40591759eb95e5d5f38dd4d_M1" phases=3 bus1="BT1001916346.1.2.3.4" conn=Delta kv=0.22 pf=1.0 pmpp=2.386 kva=2.075 %pmpp=100 irradiance=0.59 temperature=25 %cutin=0.1 %cutout=0.1 effcurve=Myeff P-TCurve=MyPvsT Daily=PVIrrad_RMTQ1302 TDaily=MyTemp
New "PVsystem.BT_03d906329346ab79081b15db1d357292bdadf66fcf20975f7048d89d13d4b11b_M1" phases=1 bus1="BT1001573842.1.2.4" conn=Delta kv=0.22 pf=1.0 pmpp=1.031 kva=0.896 %pmpp=100 irradiance=0.59 temperature=25 %cutin=0.1 %cutout=0.1 effcurve=Myeff P-TCurve=MyPvsT Daily=PVIrrad_RMTQ1302 TDaily=MyTemp
!New "PVsystem.BT_dcba161bb6b5a7139c56ae9086ba39b44ab4f9e708ad48e1053546ca87462e25_M1" phases=3 bus1="BT1000945033.1.2.3.4" conn=Delta kv=0.22 pf=1.0 pmpp=0.000 kva=0.000 %pmpp=100 irradiance=0.59 temperature=25 %cutin=0.1 %cutout=0.1 effcurve=Myeff P-TCurve=MyPvsT Daily=PVIrrad_RMTQ1302 TDaily=MyTemp
New "PVsystem.BT_7c244542641461108671f0976fcf145b2b56f249def2294a55f3a3ffdd87594c_M1" phases=1 bus1="BT1000939899.1.2.4" conn=Delta kv=0.22 pf=1.0 pmpp=0.305 kva=0.265 %pmpp=100 irradiance=0.59 temperature=25 %cutin=0.1 %cutout=0.1 effcurve=Myeff P-TCurve=MyPvsT Daily=PVIrrad_RMTQ1302 TDaily=MyTemp
New "PVsystem.BT_55c6ceccdc0a51e16ed576f279f8b6288924a14920621653eea2e305d00ec9f7_M1" phases=3 bus1="BT1000944986.1.2.3.4" conn=Delta kv=0.22 pf=1.0 pmpp=1.264 kva=1.099 %pmpp=100 irradiance=0.59 temperature=25 %cutin=0.1 %cutout=0.1 effcurve=Myeff P-TCurve=MyPvsT Daily=PVIrrad_RMTQ1302 TDaily=MyTemp
New "PVsystem.BT_f2ebe6a7a43b9fded7a8c76ff55c8928eb7eaf6519c6122458d81a915372499f_M1" phases=1 bus1="BT1000944997.1.2.4" conn=Delta kv=0.22 pf=1.0 pmpp=7.107 kva=6.180 %pmpp=100 irradiance=0.59 temperature=25 %cutin=0.1 %cutout=0.1 effcurve=Myeff P-TCurve=MyPvsT Daily=PVIrrad_RMTQ1302 TDaily=MyTemp
New "PVsystem.BT_55c8dc2e7ac997b6f8cd2a89830257604a4cce638f664b394c57d46a3b77e967_M1" phases=1 bus1="BT1000945155.1.2.4" conn=Delta kv=0.22 pf=1.0 pmpp=0.256 kva=0.223 %pmpp=100 irradiance=0.59 temperature=25 %cutin=0.1 %cutout=0.1 effcurve=Myeff P-TCurve=MyPvsT Daily=PVIrrad_RMTQ1302 TDaily=MyTemp
!New "PVsystem.BT_9472d88ef3e912ebb6b31e06113a6ddb06db7e55aab5e8ab90ca3515f09b285f_M1" phases=3 bus1="BT1001642938.1.2.3.4" conn=Delta kv=0.22 pf=1.0 pmpp=0.000 kva=0.000 %pmpp=100 irradiance=0.59 temperature=25 %cutin=0.1 %cutout=0.1 effcurve=Myeff P-TCurve=MyPvsT Daily=PVIrrad_RMTQ1302 TDaily=MyTemp
!New "PVsystem.BT_109f189b9436c0f7b63faff1e7371a6f5d8fbfd01c920ee2caeeb1bc41a9ee89_M1" phases=1 bus1="BT1000893676.1.2.4" conn=Delta kv=0.22 pf=1.0 pmpp=0.000 kva=0.000 %pmpp=100 irradiance=0.59 temperature=25 %cutin=0.1 %cutout=0.1 effcurve=Myeff P-TCurve=MyPvsT Daily=PVIrrad_RMTQ1302 TDaily=MyTemp
New "PVsystem.BT_604884334a6c09964cf4c831f15f9774c8e79a8bb9bf7d27b740962b504da872_M1" phases=1 bus1="BT1000945367.1.2.4" conn=Delta kv=0.22 pf=1.0 pmpp=0.013 kva=0.011 %pmpp=100 irradiance=0.59 temperature=25 %cutin=0.1 %cutout=0.1 effcurve=Myeff P-TCurve=MyPvsT Daily=PVIrrad_RMTQ1302 TDaily=MyTemp
New "PVsystem.BT_6dad236c817e44d144a4ec940f1d5e20d33310b3e15e50b54c2d50ae932226ae_M1" phases=1 bus1="BT1000926080.2.3.4" conn=Delta kv=0.22 pf=1.0 pmpp=0.193 kva=0.168 %pmpp=100 irradiance=0.59 temperature=25 %cutin=0.1 %cutout=0.1 effcurve=Myeff P-TCurve=MyPvsT Daily=PVIrrad_RMTQ1302 TDaily=MyTemp
New "PVsystem.BT_e140c84b9cc7361d722e25915c29af252ac5e10ff8a5dc3c0c95baa633f16215_M1" phases=1 bus1="BT1000932424.2.3.4" conn=Delta kv=0.22 pf=1.0 pmpp=3.384 kva=2.942 %pmpp=100 irradiance=0.59 temperature=25 %cutin=0.1 %cutout=0.1 effcurve=Myeff P-TCurve=MyPvsT Daily=PVIrrad_RMTQ1302 TDaily=MyTemp
!New "PVsystem.BT_418abcd3dbfc4bb686772a4517c1c666ec99ce6bdcff39fc2a6a2e6596320bf2_M1" phases=1 bus1="BT1000838614.1.2.4" conn=Delta kv=0.22 pf=1.0 pmpp=0.000 kva=0.000 %pmpp=100 irradiance=0.59 temperature=25 %cutin=0.1 %cutout=0.1 effcurve=Myeff P-TCurve=MyPvsT Daily=PVIrrad_RMTQ1302 TDaily=MyTemp
New "PVsystem.BT_ed609bc5eb0ee7c4b02f2caab79154b06c4e33291cd02803144dac1fb9142751_M1" phases=1 bus1="BT1000838439.2.3.4" conn=Delta kv=0.22 pf=1.0 pmpp=0.201 kva=0.174 %pmpp=100 irradiance=0.59 temperature=25 %cutin=0.1 %cutout=0.1 effcurve=Myeff P-TCurve=MyPvsT Daily=PVIrrad_RMTQ1302 TDaily=MyTemp
!New "PVsystem.BT_19591cedb64f02f40f0a73435baa4e1b56fbabcc3e48edcd2878b68555df2cd2_M1" phases=1 bus1="BT1001561558.1.2.4" conn=Delta kv=0.22 pf=1.0 pmpp=0.000 kva=0.000 %pmpp=100 irradiance=0.59 temperature=25 %cutin=0.1 %cutout=0.1 effcurve=Myeff P-TCurve=MyPvsT Daily=PVIrrad_RMTQ1302 TDaily=MyTemp
!New "PVsystem.BT_eccf179085939e509daea04ba64faae5d83331e5ae831d1997056edaf5953431_M1" phases=3 bus1="BT1000893733.1.2.3.4" conn=Delta kv=0.22 pf=1.0 pmpp=0.000 kva=0.000 %pmpp=100 irradiance=0.59 temperature=25 %cutin=0.1 %cutout=0.1 effcurve=Myeff P-TCurve=MyPvsT Daily=PVIrrad_RMTQ1302 TDaily=MyTemp
New "PVsystem.BT_ba5543ece8c0d13cac90dbce32863d3fb73d5a6978f8b0cac5fef029520df67e_M1" phases=1 bus1="BT1000945129.3.1.4" conn=Delta kv=0.22 pf=1.0 pmpp=0.381 kva=0.331 %pmpp=100 irradiance=0.59 temperature=25 %cutin=0.1 %cutout=0.1 effcurve=Myeff P-TCurve=MyPvsT Daily=PVIrrad_RMTQ1302 TDaily=MyTemp
New "PVsystem.BT_a3cdd339f5e411b0e65350edf763d7c2b4022b7eed2107386360bf4d9185bbd3_M1" phases=3 bus1="BT1000945388.1.2.3.4" conn=Delta kv=0.22 pf=1.0 pmpp=2.371 kva=2.062 %pmpp=100 irradiance=0.59 temperature=25 %cutin=0.1 %cutout=0.1 effcurve=Myeff P-TCurve=MyPvsT Daily=PVIrrad_RMTQ1302 TDaily=MyTemp
!New "PVsystem.BT_c785caa11321b5f3755f6f121166b0b7f2e4997bf392aa8d32469984410cdf49_M1" phases=3 bus1="BT1001887706.1.2.3.4" conn=Delta kv=0.22 pf=1.0 pmpp=0.000 kva=0.000 %pmpp=100 irradiance=0.59 temperature=25 %cutin=0.1 %cutout=0.1 effcurve=Myeff P-TCurve=MyPvsT Daily=PVIrrad_RMTQ1302 TDaily=MyTemp
New "PVsystem.BT_3685f76069a91633bd878e31fe967f5ca67c5c5b78705cf27577c5ab12ae4cbe_M1" phases=3 bus1="BT1002123890.1.2.3.4" conn=Delta kv=0.22 pf=1.0 pmpp=1.122 kva=0.976 %pmpp=100 irradiance=0.59 temperature=25 %cutin=0.1 %cutout=0.1 effcurve=Myeff P-TCurve=MyPvsT Daily=PVIrrad_RMTQ1302 TDaily=MyTemp
New "PVsystem.BT_96fec915e51d3f8267182a14d07e99ee9715210787ed487c702d21cd19e2fed2_M1" phases=1 bus1="BT1001119659.2.3.4" conn=Delta kv=0.22 pf=1.0 pmpp=0.360 kva=0.313 %pmpp=100 irradiance=0.59 temperature=25 %cutin=0.1 %cutout=0.1 effcurve=Myeff P-TCurve=MyPvsT Daily=PVIrrad_RMTQ1302 TDaily=MyTemp
New "PVsystem.BT_1f778edaff9234e0e5871d2d9b4d9a4bd9a05ab30831cc9a3d188180d25e80d2_M1" phases=1 bus1="BT1000888705.1.2.4" conn=Delta kv=0.22 pf=1.0 pmpp=0.685 kva=0.596 %pmpp=100 irradiance=0.59 temperature=25 %cutin=0.1 %cutout=0.1 effcurve=Myeff P-TCurve=MyPvsT Daily=PVIrrad_RMTQ1302 TDaily=MyTemp
New "PVsystem.BT_136210e635e19cc331a07d325e5bed7c13c27650f9dbefc81c60e7bda85a0e4a_M1" phases=3 bus1="BT1001885049.1.2.3.4" conn=Delta kv=0.22 pf=1.0 pmpp=0.977 kva=0.850 %pmpp=100 irradiance=0.59 temperature=25 %cutin=0.1 %cutout=0.1 effcurve=Myeff P-TCurve=MyPvsT Daily=PVIrrad_RMTQ1302 TDaily=MyTemp
!New "PVsystem.BT_d53a4dfa5413efac8910e8c82a83b8116b6e0371e97d2dbfce39f762f2ca52b5_M1" phases=3 bus1="BT1001828623.1.2.3.4" conn=Delta kv=0.22 pf=1.0 pmpp=0.000 kva=0.000 %pmpp=100 irradiance=0.59 temperature=25 %cutin=0.1 %cutout=0.1 effcurve=Myeff P-TCurve=MyPvsT Daily=PVIrrad_RMTQ1302 TDaily=MyTemp
New "PVsystem.BT_7f11054c455b0067607a1e943a26c8e1ea3a8818de924f0aee8ed0a4628fd604_M1" phases=3 bus1="BT1001980100.1.2.3.4" conn=Delta kv=0.22 pf=1.0 pmpp=0.622 kva=0.541 %pmpp=100 irradiance=0.59 temperature=25 %cutin=0.1 %cutout=0.1 effcurve=Myeff P-TCurve=MyPvsT Daily=PVIrrad_RMTQ1302 TDaily=MyTemp
New "PVsystem.BT_b1012665fbf9babe30f41fd0a5cf396865061c6740728bcf501886a36cf8493e_M1" phases=3 bus1="BT1002227758.1.2.3.4" conn=Delta kv=0.22 pf=1.0 pmpp=0.041 kva=0.035 %pmpp=100 irradiance=0.59 temperature=25 %cutin=0.1 %cutout=0.1 effcurve=Myeff P-TCurve=MyPvsT Daily=PVIrrad_RMTQ1302 TDaily=MyTemp
New "PVsystem.BT_0c282bc3e06bbb8cab478a9fa86f503dde89d8b5e720023556053d2ab7c14d10_M1" phases=3 bus1="BT1002199284.1.2.3.4" conn=Delta kv=0.22 pf=1.0 pmpp=0.622 kva=0.541 %pmpp=100 irradiance=0.59 temperature=25 %cutin=0.1 %cutout=0.1 effcurve=Myeff P-TCurve=MyPvsT Daily=PVIrrad_RMTQ1302 TDaily=MyTemp
New "PVsystem.BT_00444f2d11418889394045bdef5230b7a13423395db36dfd15887f03df02c2b8_M1" phases=3 bus1="BT1001795298.1.2.3.4" conn=Delta kv=0.22 pf=1.0 pmpp=0.777 kva=0.675 %pmpp=100 irradiance=0.59 temperature=25 %cutin=0.1 %cutout=0.1 effcurve=Myeff P-TCurve=MyPvsT Daily=PVIrrad_RMTQ1302 TDaily=MyTemp
New "PVsystem.BT_472343839be098ad126e40f9265b4741c46bbfa7097163279977ac8abd49fe62_M1" phases=1 bus1="BT1001871079.1.2.4" conn=Delta kv=0.22 pf=1.0 pmpp=1.465 kva=1.274 %pmpp=100 irradiance=0.59 temperature=25 %cutin=0.1 %cutout=0.1 effcurve=Myeff P-TCurve=MyPvsT Daily=PVIrrad_RMTQ1302 TDaily=MyTemp
New "PVsystem.BT_644f493884578519fe1d2364af218196d22b2cb1dcb3c97dc1953ef96c4239f8_M1" phases=3 bus1="BT1002173789.1.2.3.4" conn=Delta kv=0.22 pf=1.0 pmpp=0.914 kva=0.795 %pmpp=100 irradiance=0.59 temperature=25 %cutin=0.1 %cutout=0.1 effcurve=Myeff P-TCurve=MyPvsT Daily=PVIrrad_RMTQ1302 TDaily=MyTemp
!New "PVsystem.BT_c687ae7cb07b37d324f0d8049d2744ad69765d3cec920730c55ffac6030f6b84_M1" phases=1 bus1="BT1001792298.1.2.4" conn=Delta kv=0.22 pf=1.0 pmpp=0.000 kva=0.000 %pmpp=100 irradiance=0.59 temperature=25 %cutin=0.1 %cutout=0.1 effcurve=Myeff P-TCurve=MyPvsT Daily=PVIrrad_RMTQ1302 TDaily=MyTemp
New "PVsystem.BT_f7ec0bd53dc81b9ed7db42d933c865795c2f3fffcd2d818c9b16c92751485ef9_M1" phases=3 bus1="BT1001866376.1.2.3.4" conn=Delta kv=0.22 pf=1.0 pmpp=0.817 kva=0.711 %pmpp=100 irradiance=0.59 temperature=25 %cutin=0.1 %cutout=0.1 effcurve=Myeff P-TCurve=MyPvsT Daily=PVIrrad_RMTQ1302 TDaily=MyTemp
New "PVsystem.BT_81dee81178228e45abb9f618912c9e516c7dee13328099b820827fb363338fdb_M1" phases=3 bus1="BT1001944450.1.2.3.4" conn=Delta kv=0.22 pf=1.0 pmpp=0.327 kva=0.285 %pmpp=100 irradiance=0.59 temperature=25 %cutin=0.1 %cutout=0.1 effcurve=Myeff P-TCurve=MyPvsT Daily=PVIrrad_RMTQ1302 TDaily=MyTemp
New "PVsystem.BT_109fccba02fc665e4243c5821bd541e1b7a5c3160b8572f0267ed6530cb85094_M1" phases=3 bus1="BT1002166551.1.2.3.4" conn=Delta kv=0.22 pf=1.0 pmpp=0.822 kva=0.715 %pmpp=100 irradiance=0.59 temperature=25 %cutin=0.1 %cutout=0.1 effcurve=Myeff P-TCurve=MyPvsT Daily=PVIrrad_RMTQ1302 TDaily=MyTemp
New "PVsystem.BT_ab3494e7a4fa5e3c11b98864a377a50423b30184203a46495b30a46fb9345973_M1" phases=3 bus1="BT1001802122.1.2.3.4" conn=Delta kv=0.22 pf=1.0 pmpp=1.132 kva=0.984 %pmpp=100 irradiance=0.59 temperature=25 %cutin=0.1 %cutout=0.1 effcurve=Myeff P-TCurve=MyPvsT Daily=PVIrrad_RMTQ1302 TDaily=MyTemp
!New "PVsystem.BT_59954fe7920d33b9e559bad0b39868d550727ac4a9a4eb8a3cc73a6aa658b719_M1" phases=3 bus1="BT1001785080.1.2.3.4" conn=Delta kv=0.22 pf=1.0 pmpp=0.000 kva=0.000 %pmpp=100 irradiance=0.59 temperature=25 %cutin=0.1 %cutout=0.1 effcurve=Myeff P-TCurve=MyPvsT Daily=PVIrrad_RMTQ1302 TDaily=MyTemp
New "PVsystem.BT_410367b406d3471b3a53dac2ee13077e055cb3f4fad1ec99d31809afdab4c73b_M1" phases=3 bus1="BT1001917127.1.2.3.4" conn=Delta kv=0.22 pf=1.0 pmpp=0.774 kva=0.673 %pmpp=100 irradiance=0.59 temperature=25 %cutin=0.1 %cutout=0.1 effcurve=Myeff P-TCurve=MyPvsT Daily=PVIrrad_RMTQ1302 TDaily=MyTemp
New "PVsystem.BT_abb12a3e23ba348f5d5adce2437961efe18d97a72cd3ebf5d16e281e6f6bfb13_M1" phases=3 bus1="BT1001737257.1.2.3.4" conn=Delta kv=0.22 pf=1.0 pmpp=0.447 kva=0.388 %pmpp=100 irradiance=0.59 temperature=25 %cutin=0.1 %cutout=0.1 effcurve=Myeff P-TCurve=MyPvsT Daily=PVIrrad_RMTQ1302 TDaily=MyTemp
New "PVsystem.BT_69fad5f1474c4d8fcb1cdf0bad5c06450b06be537d5424b3568f42c1a0db57d2_M1" phases=3 bus1="BT1002255187.1.2.3.4" conn=Delta kv=0.22 pf=1.0 pmpp=0.921 kva=0.801 %pmpp=100 irradiance=0.59 temperature=25 %cutin=0.1 %cutout=0.1 effcurve=Myeff P-TCurve=MyPvsT Daily=PVIrrad_RMTQ1302 TDaily=MyTemp
New "PVsystem.BT_9cadac8526788515a35ea6f1f433171e2c0945c1f4eb3eef8da34af40bae7704_M1" phases=1 bus1="BT1002155512.3.1.4" conn=Delta kv=0.22 pf=1.0 pmpp=0.835 kva=0.726 %pmpp=100 irradiance=0.59 temperature=25 %cutin=0.1 %cutout=0.1 effcurve=Myeff P-TCurve=MyPvsT Daily=PVIrrad_RMTQ1302 TDaily=MyTemp
New "PVsystem.BT_89e16cdcba10f1fa6696137ef71350387aeb864be9931522b8a78e602a8534e7_M1" phases=3 bus1="BT1001918085.1.2.3.4" conn=Delta kv=0.22 pf=1.0 pmpp=0.353 kva=0.307 %pmpp=100 irradiance=0.59 temperature=25 %cutin=0.1 %cutout=0.1 effcurve=Myeff P-TCurve=MyPvsT Daily=PVIrrad_RMTQ1302 TDaily=MyTemp
!New "PVsystem.BT_519b04afcd6e8e57211aa0d16d763aacb6b9ae9372fb123e3ef17deeeee6e524_M1" phases=1 bus1="BT1002081939.2.3.4" conn=Delta kv=0.22 pf=1.0 pmpp=0.000 kva=0.000 %pmpp=100 irradiance=0.59 temperature=25 %cutin=0.1 %cutout=0.1 effcurve=Myeff P-TCurve=MyPvsT Daily=PVIrrad_RMTQ1302 TDaily=MyTemp
New "PVsystem.BT_f450770ae2603684d66be79a7ee04d41fcbfa3b270eabf6c3c0103ff7acc059b_M1" phases=3 bus1="BT1001756622.1.2.3.4" conn=Delta kv=0.22 pf=1.0 pmpp=0.429 kva=0.373 %pmpp=100 irradiance=0.59 temperature=25 %cutin=0.1 %cutout=0.1 effcurve=Myeff P-TCurve=MyPvsT Daily=PVIrrad_RMTQ1302 TDaily=MyTemp
New "PVsystem.BT_78a4a35bca6591fb1326d5c9cd9d50ad35dad71c07f99ce4cc310003b82c705e_M1" phases=3 bus1="BT1002038119.1.2.3.4" conn=Delta kv=0.22 pf=1.0 pmpp=0.696 kva=0.605 %pmpp=100 irradiance=0.59 temperature=25 %cutin=0.1 %cutout=0.1 effcurve=Myeff P-TCurve=MyPvsT Daily=PVIrrad_RMTQ1302 TDaily=MyTemp
New "PVsystem.BT_bed925aa4e4412af4e35be2650595e6bdf22bc6af298bffc03c73d73609d737f_M1" phases=1 bus1="BT1002093178.3.1.4" conn=Delta kv=0.22 pf=1.0 pmpp=0.670 kva=0.583 %pmpp=100 irradiance=0.59 temperature=25 %cutin=0.1 %cutout=0.1 effcurve=Myeff P-TCurve=MyPvsT Daily=PVIrrad_RMTQ1302 TDaily=MyTemp
New "PVsystem.BT_e2134ec0b6c50e503f3a0d7cc0620c2c95ff9c04d758f764cba2e1db03bc9f5d_M1" phases=3 bus1="BT1001934489.1.2.3.4" conn=Delta kv=0.22 pf=1.0 pmpp=0.487 kva=0.424 %pmpp=100 irradiance=0.59 temperature=25 %cutin=0.1 %cutout=0.1 effcurve=Myeff P-TCurve=MyPvsT Daily=PVIrrad_RMTQ1302 TDaily=MyTemp
New "PVsystem.BT_367293f6f556eaaa7289b4ece03b00c14d8e4290ca454d393ab66ccc0f3a152a_M1" phases=3 bus1="BT1002211788.1.2.3.4" conn=Delta kv=0.22 pf=1.0 pmpp=0.373 kva=0.324 %pmpp=100 irradiance=0.59 temperature=25 %cutin=0.1 %cutout=0.1 effcurve=Myeff P-TCurve=MyPvsT Daily=PVIrrad_RMTQ1302 TDaily=MyTemp
New "PVsystem.BT_5ec3d98254c4b45cd2432efc8d41326427c3f84c477abda4f7cbd124bf209d3c_M1" phases=3 bus1="BT1001964647.1.2.3.4" conn=Delta kv=0.22 pf=1.0 pmpp=0.645 kva=0.561 %pmpp=100 irradiance=0.59 temperature=25 %cutin=0.1 %cutout=0.1 effcurve=Myeff P-TCurve=MyPvsT Daily=PVIrrad_RMTQ1302 TDaily=MyTemp
New "PVsystem.BT_71214d8b9322432b29a53ab5c66bdf60aad4bb10206b5f3dee7e2457c3d169eb_M1" phases=3 bus1="BT1002008102.1.2.3.4" conn=Delta kv=0.22 pf=1.0 pmpp=0.795 kva=0.691 %pmpp=100 irradiance=0.59 temperature=25 %cutin=0.1 %cutout=0.1 effcurve=Myeff P-TCurve=MyPvsT Daily=PVIrrad_RMTQ1302 TDaily=MyTemp
New "PVsystem.BT_23c7a0e24062651a1d89c5e556b11eaa37312a6e6fe143d169e30ad23d4d6b54_M1" phases=3 bus1="BT1002221710.1.2.3.4" conn=Delta kv=0.22 pf=1.0 pmpp=1.071 kva=0.931 %pmpp=100 irradiance=0.59 temperature=25 %cutin=0.1 %cutout=0.1 effcurve=Myeff P-TCurve=MyPvsT Daily=PVIrrad_RMTQ1302 TDaily=MyTemp
New "PVsystem.BT_e68e93320217c19a80b51f61790579cc16a98dba868d70514571409061502235_M1" phases=3 bus1="BT1002205092.1.2.3.4" conn=Delta kv=0.22 pf=1.0 pmpp=0.533 kva=0.464 %pmpp=100 irradiance=0.59 temperature=25 %cutin=0.1 %cutout=0.1 effcurve=Myeff P-TCurve=MyPvsT Daily=PVIrrad_RMTQ1302 TDaily=MyTemp
New "PVsystem.BT_cdde24bc65696f6262bcec1cfe27cc8fb020d4bb5bd6fdba5ae8ea4e8c9a4d14_M1" phases=3 bus1="BT1002187571.1.2.3.4" conn=Delta kv=0.22 pf=1.0 pmpp=0.713 kva=0.620 %pmpp=100 irradiance=0.59 temperature=25 %cutin=0.1 %cutout=0.1 effcurve=Myeff P-TCurve=MyPvsT Daily=PVIrrad_RMTQ1302 TDaily=MyTemp
New "PVsystem.BT_54c02735c9f70967183fe876e257329d2ff80e15330481057477df8aabb9aa8f_M1" phases=3 bus1="BT1002200402.1.2.3.4" conn=Delta kv=0.22 pf=1.0 pmpp=0.754 kva=0.656 %pmpp=100 irradiance=0.59 temperature=25 %cutin=0.1 %cutout=0.1 effcurve=Myeff P-TCurve=MyPvsT Daily=PVIrrad_RMTQ1302 TDaily=MyTemp
New "PVsystem.BT_16b3c1f4c74d32efe0890f8a8e81f4790b364494877d78c9648f5b05dafa5454_M1" phases=3 bus1="BT1002118593.1.2.3.4" conn=Delta kv=0.22 pf=1.0 pmpp=1.104 kva=0.960 %pmpp=100 irradiance=0.59 temperature=25 %cutin=0.1 %cutout=0.1 effcurve=Myeff P-TCurve=MyPvsT Daily=PVIrrad_RMTQ1302 TDaily=MyTemp
New "PVsystem.BT_6473d819a70df79fc75e644b2277a810b57ecc46938ec3fb3cc3fef35365ab0a_M1" phases=3 bus1="BT1002118077.1.2.3.4" conn=Delta kv=0.22 pf=1.0 pmpp=0.810 kva=0.704 %pmpp=100 irradiance=0.59 temperature=25 %cutin=0.1 %cutout=0.1 effcurve=Myeff P-TCurve=MyPvsT Daily=PVIrrad_RMTQ1302 TDaily=MyTemp
New "PVsystem.BT_32a836d58409d185ce40d339b538bcb9bb01aa6f6454cc75b1b7f31d9acb2a2f_M1" phases=3 bus1="BT1002110852.1.2.3.4" conn=Delta kv=0.22 pf=1.0 pmpp=0.490 kva=0.426 %pmpp=100 irradiance=0.59 temperature=25 %cutin=0.1 %cutout=0.1 effcurve=Myeff P-TCurve=MyPvsT Daily=PVIrrad_RMTQ1302 TDaily=MyTemp
New "PVsystem.BT_31181226663b6c780300ae0295ed7de02c3d6d0dc2223c637d1f390478bf5084_M1" phases=1 bus1="BT1002028292.1.2.4" conn=Delta kv=0.22 pf=1.0 pmpp=0.500 kva=0.435 %pmpp=100 irradiance=0.59 temperature=25 %cutin=0.1 %cutout=0.1 effcurve=Myeff P-TCurve=MyPvsT Daily=PVIrrad_RMTQ1302 TDaily=MyTemp
New "PVsystem.BT_baf52c5a09b9abbf2f28334d5d00266ec8052a9e821fad22b71cd0d2fc9ba4ee_M1" phases=3 bus1="BT1001896498.1.2.3.4" conn=Delta kv=0.22 pf=1.0 pmpp=0.480 kva=0.417 %pmpp=100 irradiance=0.59 temperature=25 %cutin=0.1 %cutout=0.1 effcurve=Myeff P-TCurve=MyPvsT Daily=PVIrrad_RMTQ1302 TDaily=MyTemp
New "PVsystem.BT_d43362d6d1254290b3543d20938940ca699ffe227a6d72f066ed6281561c73b9_M1" phases=3 bus1="BT1002153799.1.2.3.4" conn=Delta kv=0.22 pf=1.0 pmpp=2.069 kva=1.799 %pmpp=100 irradiance=0.59 temperature=25 %cutin=0.1 %cutout=0.1 effcurve=Myeff P-TCurve=MyPvsT Daily=PVIrrad_RMTQ1302 TDaily=MyTemp
New "PVsystem.BT_4fb9d05b4b26fbd48a423388d12471bf48da83bb0f847ee2cf404494a8dbb329_M1" phases=3 bus1="BT1002205672.1.2.3.4" conn=Delta kv=0.22 pf=1.0 pmpp=1.102 kva=0.958 %pmpp=100 irradiance=0.59 temperature=25 %cutin=0.1 %cutout=0.1 effcurve=Myeff P-TCurve=MyPvsT Daily=PVIrrad_RMTQ1302 TDaily=MyTemp
New "PVsystem.BT_2ba04b6c0d983662b024ff09594a82820ac63f0a85aaf1610b673362d0f69c94_M1" phases=3 bus1="BT1001927851.1.2.3.4" conn=Delta kv=0.22 pf=1.0 pmpp=0.228 kva=0.199 %pmpp=100 irradiance=0.59 temperature=25 %cutin=0.1 %cutout=0.1 effcurve=Myeff P-TCurve=MyPvsT Daily=PVIrrad_RMTQ1302 TDaily=MyTemp
New "PVsystem.BT_153b86f59be57b1871a6a792c8d00e7c370106460e87fc56132d514b746e2777_M1" phases=1 bus1="BT1002144627.3.1.4" conn=Delta kv=0.22 pf=1.0 pmpp=0.858 kva=0.746 %pmpp=100 irradiance=0.59 temperature=25 %cutin=0.1 %cutout=0.1 effcurve=Myeff P-TCurve=MyPvsT Daily=PVIrrad_RMTQ1302 TDaily=MyTemp
New "PVsystem.BT_ad0fb9baf262828cd3adfc457f6e8df815418d369a8d7c0669ab29aeabfdebc4_M1" phases=3 bus1="BT1001780353.1.2.3.4" conn=Delta kv=0.22 pf=1.0 pmpp=0.518 kva=0.450 %pmpp=100 irradiance=0.59 temperature=25 %cutin=0.1 %cutout=0.1 effcurve=Myeff P-TCurve=MyPvsT Daily=PVIrrad_RMTQ1302 TDaily=MyTemp
New "PVsystem.BT_7dd923998e5c3e93b41dd8215195e764ea9cf88eff7010b1b25b63dbf3937455_M1" phases=3 bus1="BT1002200815.1.2.3.4" conn=Delta kv=0.22 pf=1.0 pmpp=0.414 kva=0.360 %pmpp=100 irradiance=0.59 temperature=25 %cutin=0.1 %cutout=0.1 effcurve=Myeff P-TCurve=MyPvsT Daily=PVIrrad_RMTQ1302 TDaily=MyTemp
!New "PVsystem.BT_f5b05409f360a3b8ec40a4d8bc6f9c436f64db4772261ba93796bcbc9495c6ed_M1" phases=3 bus1="BT1002259223.1.2.3.4" conn=Delta kv=0.22 pf=1.0 pmpp=0.000 kva=0.000 %pmpp=100 irradiance=0.59 temperature=25 %cutin=0.1 %cutout=0.1 effcurve=Myeff P-TCurve=MyPvsT Daily=PVIrrad_RMTQ1302 TDaily=MyTemp
New "PVsystem.BT_d7f8c4b91e97bf8d111227ccce2c1ba10ca77215f9710c19899ddeb2976bbdcc_M1" phases=1 bus1="BT1001808525.1.2.4" conn=Delta kv=0.22 pf=1.0 pmpp=1.198 kva=1.042 %pmpp=100 irradiance=0.59 temperature=25 %cutin=0.1 %cutout=0.1 effcurve=Myeff P-TCurve=MyPvsT Daily=PVIrrad_RMTQ1302 TDaily=MyTemp
New "PVsystem.BT_658d77562c244cd07ea83c244dc65168f9c25da8a2674ea05f01e9a34d9ca72b_M1" phases=3 bus1="BT1002196941.1.2.3.4" conn=Delta kv=0.22 pf=1.0 pmpp=0.853 kva=0.742 %pmpp=100 irradiance=0.59 temperature=25 %cutin=0.1 %cutout=0.1 effcurve=Myeff P-TCurve=MyPvsT Daily=PVIrrad_RMTQ1302 TDaily=MyTemp
New "PVsystem.BT_5661ab4aaf9b5c5922f07e1caf16d4789bcd648d7e7d8fd86de58d0d731028e1_M1" phases=3 bus1="BT1002251603.1.2.3.4" conn=Delta kv=0.22 pf=1.0 pmpp=1.190 kva=1.035 %pmpp=100 irradiance=0.59 temperature=25 %cutin=0.1 %cutout=0.1 effcurve=Myeff P-TCurve=MyPvsT Daily=PVIrrad_RMTQ1302 TDaily=MyTemp
New "PVsystem.BT_fe6fb8068173d5c58ca11abea2fe96ae7a0c437cd340e09656745541d5b85b32_M1" phases=1 bus1="BT1002005699.1.2.4" conn=Delta kv=0.22 pf=1.0 pmpp=0.206 kva=0.179 %pmpp=100 irradiance=0.59 temperature=25 %cutin=0.1 %cutout=0.1 effcurve=Myeff P-TCurve=MyPvsT Daily=PVIrrad_RMTQ1302 TDaily=MyTemp
!New "PVsystem.BT_207d47d6531d0d20c813bf575e464a694fd4a9175fb94d57a3f8c78995185430_M1" phases=3 bus1="BT1002113002.1.2.3.4" conn=Delta kv=0.22 pf=1.0 pmpp=0.000 kva=0.000 %pmpp=100 irradiance=0.59 temperature=25 %cutin=0.1 %cutout=0.1 effcurve=Myeff P-TCurve=MyPvsT Daily=PVIrrad_RMTQ1302 TDaily=MyTemp
!New "PVsystem.BT_4d36e66b7e8344662399ce0b1d7d6cefdd154241ae1ffd2536e6ee7fd8ae0ec1_M1" phases=3 bus1="BT1001999398.1.2.3.4" conn=Delta kv=0.22 pf=1.0 pmpp=0.000 kva=0.000 %pmpp=100 irradiance=0.59 temperature=25 %cutin=0.1 %cutout=0.1 effcurve=Myeff P-TCurve=MyPvsT Daily=PVIrrad_RMTQ1302 TDaily=MyTemp
New "PVsystem.BT_79f6afda68622a3dd6216ba63cdab328541daf5fc313ec322fe2c2227aeb208b_M1" phases=3 bus1="BT1001998690.1.2.3.4" conn=Delta kv=0.22 pf=1.0 pmpp=1.373 kva=1.194 %pmpp=100 irradiance=0.59 temperature=25 %cutin=0.1 %cutout=0.1 effcurve=Myeff P-TCurve=MyPvsT Daily=PVIrrad_RMTQ1302 TDaily=MyTemp
New "PVsystem.BT_6ec83d8920fe26444fd50d7d32f794d64cf533c7701ee94ba885b79bd1271748_M1" phases=3 bus1="BT1002136005.1.2.3.4" conn=Delta kv=0.22 pf=1.0 pmpp=0.708 kva=0.616 %pmpp=100 irradiance=0.59 temperature=25 %cutin=0.1 %cutout=0.1 effcurve=Myeff P-TCurve=MyPvsT Daily=PVIrrad_RMTQ1302 TDaily=MyTemp
New "PVsystem.BT_63f0ff8d8e72ee89157ae6fe4e4d044cc1f3e59d93c6878bc08882b9e6fd3c6c_M1" phases=3 bus1="BT1002183396.1.2.3.4" conn=Delta kv=0.22 pf=1.0 pmpp=0.602 kva=0.523 %pmpp=100 irradiance=0.59 temperature=25 %cutin=0.1 %cutout=0.1 effcurve=Myeff P-TCurve=MyPvsT Daily=PVIrrad_RMTQ1302 TDaily=MyTemp
New "PVsystem.BT_222939b1d389785cb76af6fa2ef7a7f8ef3eca0b53ea88efb8e25ec97be60925_M1" phases=3 bus1="BT1002204859.1.2.3.4" conn=Delta kv=0.22 pf=1.0 pmpp=2.054 kva=1.786 %pmpp=100 irradiance=0.59 temperature=25 %cutin=0.1 %cutout=0.1 effcurve=Myeff P-TCurve=MyPvsT Daily=PVIrrad_RMTQ1302 TDaily=MyTemp
New "PVsystem.BT_8daedd4c3f3fe09d094c2ebdd45be303021be886df72130508a25f1cf51e2fff_M1" phases=3 bus1="BT1002146059.1.2.3.4" conn=Delta kv=0.22 pf=1.0 pmpp=0.652 kva=0.567 %pmpp=100 irradiance=0.59 temperature=25 %cutin=0.1 %cutout=0.1 effcurve=Myeff P-TCurve=MyPvsT Daily=PVIrrad_RMTQ1302 TDaily=MyTemp
New "PVsystem.BT_dbb5c8d344571870bd80cd9667ddf3407c8063b79d6c2d4eec5f3d87a64f7a4f_M1" phases=3 bus1="BT1002003666.1.2.3.4" conn=Delta kv=0.22 pf=1.0 pmpp=0.914 kva=0.795 %pmpp=100 irradiance=0.59 temperature=25 %cutin=0.1 %cutout=0.1 effcurve=Myeff P-TCurve=MyPvsT Daily=PVIrrad_RMTQ1302 TDaily=MyTemp
New "PVsystem.BT_678308513423ab36565d3ba3f6f56bd7709785d460613d1dc6f01c80208abf41_M1" phases=3 bus1="BT1001998907.1.2.3.4" conn=Delta kv=0.22 pf=1.0 pmpp=1.008 kva=0.876 %pmpp=100 irradiance=0.59 temperature=25 %cutin=0.1 %cutout=0.1 effcurve=Myeff P-TCurve=MyPvsT Daily=PVIrrad_RMTQ1302 TDaily=MyTemp
New "PVsystem.BT_06bb228a0afd348b20eb3326ec864a28d377b6eee0c98e6aa935a2f8fd1980c7_M1" phases=3 bus1="BT1001861205.1.2.3.4" conn=Delta kv=0.22 pf=1.0 pmpp=0.759 kva=0.660 %pmpp=100 irradiance=0.59 temperature=25 %cutin=0.1 %cutout=0.1 effcurve=Myeff P-TCurve=MyPvsT Daily=PVIrrad_RMTQ1302 TDaily=MyTemp
New "PVsystem.BT_96daaa60720555163174543bf3fac51e75738d4c8c3d6d5211f416a3a2eb7321_M1" phases=3 bus1="BT1002055039.1.2.3.4" conn=Delta kv=0.22 pf=1.0 pmpp=1.503 kva=1.307 %pmpp=100 irradiance=0.59 temperature=25 %cutin=0.1 %cutout=0.1 effcurve=Myeff P-TCurve=MyPvsT Daily=PVIrrad_RMTQ1302 TDaily=MyTemp
New "PVsystem.BT_6ce76828f73ca438f7f319091843699b9c601237210adc0c9d60976b2a827298_M1" phases=3 bus1="BT1001901124.1.2.3.4" conn=Delta kv=0.22 pf=1.0 pmpp=1.234 kva=1.073 %pmpp=100 irradiance=0.59 temperature=25 %cutin=0.1 %cutout=0.1 effcurve=Myeff P-TCurve=MyPvsT Daily=PVIrrad_RMTQ1302 TDaily=MyTemp
New "PVsystem.BT_ccf2dce3c93d53500ab46e842df7d619d8d6b2589a9c85b01aae98f8941c7485_M1" phases=3 bus1="BT1002194838.1.2.3.4" conn=Delta kv=0.22 pf=1.0 pmpp=1.630 kva=1.417 %pmpp=100 irradiance=0.59 temperature=25 %cutin=0.1 %cutout=0.1 effcurve=Myeff P-TCurve=MyPvsT Daily=PVIrrad_RMTQ1302 TDaily=MyTemp
New "PVsystem.BT_e7e6a4b630a20b9a0a80aaa580e40b2ab2331b340e6acd5aabf81171ae62d930_M1" phases=3 bus1="BT1001757851.1.2.3.4" conn=Delta kv=0.22 pf=1.0 pmpp=0.574 kva=0.499 %pmpp=100 irradiance=0.59 temperature=25 %cutin=0.1 %cutout=0.1 effcurve=Myeff P-TCurve=MyPvsT Daily=PVIrrad_RMTQ1302 TDaily=MyTemp
!New "PVsystem.BT_a891375445528dc3a7708fdb567a7736401b6e0b601a50cca5f481b474bc1bea_M1" phases=3 bus1="BT1002106660.1.2.3.4" conn=Delta kv=0.22 pf=1.0 pmpp=0.000 kva=0.000 %pmpp=100 irradiance=0.59 temperature=25 %cutin=0.1 %cutout=0.1 effcurve=Myeff P-TCurve=MyPvsT Daily=PVIrrad_RMTQ1302 TDaily=MyTemp
New "PVsystem.BT_ecbb1c010993d9e010dae0cf8eb5255caeee6823f7cc5b4ebb02b8a3432f0f9c_M1" phases=3 bus1="BT1002109837.1.2.3.4" conn=Delta kv=0.22 pf=1.0 pmpp=0.637 kva=0.554 %pmpp=100 irradiance=0.59 temperature=25 %cutin=0.1 %cutout=0.1 effcurve=Myeff P-TCurve=MyPvsT Daily=PVIrrad_RMTQ1302 TDaily=MyTemp
New "PVsystem.BT_7ef015cffa0761394c0e4f6cb5e0eb667ef52c8fe26b02855e3af114aff94f67_M1" phases=3 bus1="BT1002146693.1.2.3.4" conn=Delta kv=0.22 pf=1.0 pmpp=0.965 kva=0.839 %pmpp=100 irradiance=0.59 temperature=25 %cutin=0.1 %cutout=0.1 effcurve=Myeff P-TCurve=MyPvsT Daily=PVIrrad_RMTQ1302 TDaily=MyTemp
New "PVsystem.BT_4a2a2a0259185ed5311307f29f8edf4e4d6e03f2b38d410c6f4f0db298b7af2b_M1" phases=3 bus1="BT1001934103.1.2.3.4" conn=Delta kv=0.22 pf=1.0 pmpp=1.038 kva=0.903 %pmpp=100 irradiance=0.59 temperature=25 %cutin=0.1 %cutout=0.1 effcurve=Myeff P-TCurve=MyPvsT Daily=PVIrrad_RMTQ1302 TDaily=MyTemp
New "PVsystem.BT_9cdd7e526ea02fd550ec4f09ee2634222c07e2acc6d2643a6e1c490ba0efd7dc_M1" phases=3 bus1="BT1002060453.1.2.3.4" conn=Delta kv=0.22 pf=1.0 pmpp=5.239 kva=4.556 %pmpp=100 irradiance=0.59 temperature=25 %cutin=0.1 %cutout=0.1 effcurve=Myeff P-TCurve=MyPvsT Daily=PVIrrad_RMTQ1302 TDaily=MyTemp
New "PVsystem.BT_bb48b82b69ee213974d0b85f3ae47fe1c8063e183cb0bd6bec008688b2b30c80_M1" phases=3 bus1="BT1002208237.1.2.3.4" conn=Delta kv=0.22 pf=1.0 pmpp=0.439 kva=0.382 %pmpp=100 irradiance=0.59 temperature=25 %cutin=0.1 %cutout=0.1 effcurve=Myeff P-TCurve=MyPvsT Daily=PVIrrad_RMTQ1302 TDaily=MyTemp
New "PVsystem.BT_03d577f24e3d8efee4af56cfb98b73c99066067d779195ee001acfbb7bc1b737_M1" phases=3 bus1="BT1002148066.1.2.3.4" conn=Delta kv=0.22 pf=1.0 pmpp=0.627 kva=0.545 %pmpp=100 irradiance=0.59 temperature=25 %cutin=0.1 %cutout=0.1 effcurve=Myeff P-TCurve=MyPvsT Daily=PVIrrad_RMTQ1302 TDaily=MyTemp
!New "PVsystem.BT_101c42d0cb9f705dc06e11e183e7a267571a099255f08a347713e70ef97994d4_M1" phases=3 bus1="BT1002119080.1.2.3.4" conn=Delta kv=0.22 pf=1.0 pmpp=0.000 kva=0.000 %pmpp=100 irradiance=0.59 temperature=25 %cutin=0.1 %cutout=0.1 effcurve=Myeff P-TCurve=MyPvsT Daily=PVIrrad_RMTQ1302 TDaily=MyTemp
New "PVsystem.BT_747d825eb67581f322a13ba49c86004e5b29d912bd83425cf60c9cf617c76b15_M1" phases=3 bus1="BT1001984778.1.2.3.4" conn=Delta kv=0.22 pf=1.0 pmpp=0.673 kva=0.585 %pmpp=100 irradiance=0.59 temperature=25 %cutin=0.1 %cutout=0.1 effcurve=Myeff P-TCurve=MyPvsT Daily=PVIrrad_RMTQ1302 TDaily=MyTemp
New "PVsystem.BT_73af12a563dbf2cfd2008667fd639a2cdbe34980d96b0fd4b738bd876ec0285d_M1" phases=3 bus1="BT1002106071.1.2.3.4" conn=Delta kv=0.22 pf=1.0 pmpp=0.104 kva=0.090 %pmpp=100 irradiance=0.59 temperature=25 %cutin=0.1 %cutout=0.1 effcurve=Myeff P-TCurve=MyPvsT Daily=PVIrrad_RMTQ1302 TDaily=MyTemp
New "PVsystem.BT_da947b1ccb13626adc34ec4f95e934226b4fb1fc2ac839b8ea050da4520a53f3_M1" phases=3 bus1="BT1001982323.1.2.3.4" conn=Delta kv=0.22 pf=1.0 pmpp=4.077 kva=3.545 %pmpp=100 irradiance=0.59 temperature=25 %cutin=0.1 %cutout=0.1 effcurve=Myeff P-TCurve=MyPvsT Daily=PVIrrad_RMTQ1302 TDaily=MyTemp
New "PVsystem.BT_c94ccb3079aca8bfed7cd9f11610488f3821d3fecf20ecbf5b81aef8933256b5_M1" phases=3 bus1="BT1002150962.1.2.3.4" conn=Delta kv=0.22 pf=1.0 pmpp=1.536 kva=1.335 %pmpp=100 irradiance=0.59 temperature=25 %cutin=0.1 %cutout=0.1 effcurve=Myeff P-TCurve=MyPvsT Daily=PVIrrad_RMTQ1302 TDaily=MyTemp
New "PVsystem.BT_baad4f29b90826a00bc048267684c3a02ba7c5943f593f5be5511b172b414ff7_M1" phases=3 bus1="BT1001883402.1.2.3.4" conn=Delta kv=0.22 pf=1.0 pmpp=1.000 kva=0.870 %pmpp=100 irradiance=0.59 temperature=25 %cutin=0.1 %cutout=0.1 effcurve=Myeff P-TCurve=MyPvsT Daily=PVIrrad_RMTQ1302 TDaily=MyTemp
New "PVsystem.BT_994b94a5becd8e1b7b7fc7ee830417419736c4b1b9daeebbd02ca9454e57b944_M1" phases=3 bus1="BT1001795302.1.2.3.4" conn=Delta kv=0.22 pf=1.0 pmpp=0.876 kva=0.762 %pmpp=100 irradiance=0.59 temperature=25 %cutin=0.1 %cutout=0.1 effcurve=Myeff P-TCurve=MyPvsT Daily=PVIrrad_RMTQ1302 TDaily=MyTemp
New "PVsystem.BT_93e5123908ff316ea72c2a7c68395e06bef8a47e528335434f87a55af1ad4d0a_M1" phases=3 bus1="BT1002156569.1.2.3.4" conn=Delta kv=0.22 pf=1.0 pmpp=0.650 kva=0.565 %pmpp=100 irradiance=0.59 temperature=25 %cutin=0.1 %cutout=0.1 effcurve=Myeff P-TCurve=MyPvsT Daily=PVIrrad_RMTQ1302 TDaily=MyTemp
New "PVsystem.BT_2e3131c1691321efca6ddcb1278cc00e17991960229cecf1606c30aa2de61875_M1" phases=3 bus1="BT1001956096.1.2.3.4" conn=Delta kv=0.22 pf=1.0 pmpp=0.459 kva=0.400 %pmpp=100 irradiance=0.59 temperature=25 %cutin=0.1 %cutout=0.1 effcurve=Myeff P-TCurve=MyPvsT Daily=PVIrrad_RMTQ1302 TDaily=MyTemp
New "PVsystem.BT_a6d8b6d0c0e63af7ae3e4f0cd651d1409a83207cad4eb7efbc8ef5be6ea0649b_M1" phases=3 bus1="BT1002131343.1.2.3.4" conn=Delta kv=0.22 pf=1.0 pmpp=1.119 kva=0.973 %pmpp=100 irradiance=0.59 temperature=25 %cutin=0.1 %cutout=0.1 effcurve=Myeff P-TCurve=MyPvsT Daily=PVIrrad_RMTQ1302 TDaily=MyTemp
New "PVsystem.BT_3691c7f43077f136fbd9d5fc5e77ed0b86b215b790b2377c991c2924570dc673_M1" phases=3 bus1="BT1002219170.1.2.3.4" conn=Delta kv=0.22 pf=1.0 pmpp=3.117 kva=2.711 %pmpp=100 irradiance=0.59 temperature=25 %cutin=0.1 %cutout=0.1 effcurve=Myeff P-TCurve=MyPvsT Daily=PVIrrad_RMTQ1302 TDaily=MyTemp
New "PVsystem.BT_21e618b970bb6e0534027d67021920b33a4ffe6c0ad9e8d6883671f3d33f6d30_M1" phases=3 bus1="BT1002162973.1.2.3.4" conn=Delta kv=0.22 pf=1.0 pmpp=0.325 kva=0.283 %pmpp=100 irradiance=0.59 temperature=25 %cutin=0.1 %cutout=0.1 effcurve=Myeff P-TCurve=MyPvsT Daily=PVIrrad_RMTQ1302 TDaily=MyTemp
New "PVsystem.BT_96f1a1acc07a938a9560232fe7c8bed2c848af1fd9734915d49bd6fd83c79b7b_M1" phases=3 bus1="BT1002166208.1.2.3.4" conn=Delta kv=0.22 pf=1.0 pmpp=0.348 kva=0.302 %pmpp=100 irradiance=0.59 temperature=25 %cutin=0.1 %cutout=0.1 effcurve=Myeff P-TCurve=MyPvsT Daily=PVIrrad_RMTQ1302 TDaily=MyTemp
New "PVsystem.BT_c5fe2610b36014b9172b0e72538cd43df03994e9b18d08fbff9bfa5c530ea549_M1" phases=3 bus1="BT1002121815.1.2.3.4" conn=Delta kv=0.22 pf=1.0 pmpp=1.107 kva=0.962 %pmpp=100 irradiance=0.59 temperature=25 %cutin=0.1 %cutout=0.1 effcurve=Myeff P-TCurve=MyPvsT Daily=PVIrrad_RMTQ1302 TDaily=MyTemp
New "PVsystem.BT_24b23be6b3f8f68f1766c5fb6713c69191135a7cc5a0bf99d6b4356b0a0f2571_M1" phases=1 bus1="BT1002112133.3.1.4" conn=Delta kv=0.22 pf=1.0 pmpp=0.525 kva=0.457 %pmpp=100 irradiance=0.59 temperature=25 %cutin=0.1 %cutout=0.1 effcurve=Myeff P-TCurve=MyPvsT Daily=PVIrrad_RMTQ1302 TDaily=MyTemp
New "PVsystem.BT_bc46fe3a12e3a9d60b948da0037fc2c3b01a6abb43e9e65c493719e46e14f493_M1" phases=1 bus1="BT1001982413.1.2.4" conn=Delta kv=0.22 pf=1.0 pmpp=0.693 kva=0.603 %pmpp=100 irradiance=0.59 temperature=25 %cutin=0.1 %cutout=0.1 effcurve=Myeff P-TCurve=MyPvsT Daily=PVIrrad_RMTQ1302 TDaily=MyTemp
New "PVsystem.BT_f3ec7cb51c00bb5c0cedad04e8842bc7f4a6f4d4c38b8a8313fc70b874b89df7_M1" phases=3 bus1="BT1001962983.1.2.3.4" conn=Delta kv=0.22 pf=1.0 pmpp=0.800 kva=0.695 %pmpp=100 irradiance=0.59 temperature=25 %cutin=0.1 %cutout=0.1 effcurve=Myeff P-TCurve=MyPvsT Daily=PVIrrad_RMTQ1302 TDaily=MyTemp
!New "PVsystem.BT_c2acbd77c5ca6e11bcbf11b5e757a01b10ed92850735e1dd0a2219251cfb655c_M1" phases=1 bus1="BT1002271439.1.2.4" conn=Delta kv=0.22 pf=1.0 pmpp=0.000 kva=0.000 %pmpp=100 irradiance=0.59 temperature=25 %cutin=0.1 %cutout=0.1 effcurve=Myeff P-TCurve=MyPvsT Daily=PVIrrad_RMTQ1302 TDaily=MyTemp
New "PVsystem.BT_9fafd24d693a2c089c21ee053b9bda690f4925932be984c3427780c900a5ac7d_M1" phases=3 bus1="BT1002099781.1.2.3.4" conn=Delta kv=0.22 pf=1.0 pmpp=0.718 kva=0.625 %pmpp=100 irradiance=0.59 temperature=25 %cutin=0.1 %cutout=0.1 effcurve=Myeff P-TCurve=MyPvsT Daily=PVIrrad_RMTQ1302 TDaily=MyTemp
!New "PVsystem.BT_406bbdaea58187d99f213fee678a449cdc4e1475afb053d0b35509f41c31122c_M1" phases=3 bus1="BT1002204090.1.2.3.4" conn=Delta kv=0.22 pf=1.0 pmpp=0.000 kva=0.000 %pmpp=100 irradiance=0.59 temperature=25 %cutin=0.1 %cutout=0.1 effcurve=Myeff P-TCurve=MyPvsT Daily=PVIrrad_RMTQ1302 TDaily=MyTemp
!New "PVsystem.BT_6ad66735e6d2397683f9410d5bca03f77d31eec63a72a6601be2dc7f8cec72ad_M1" phases=3 bus1="BT1002059319.1.2.3.4" conn=Delta kv=0.22 pf=1.0 pmpp=0.000 kva=0.000 %pmpp=100 irradiance=0.59 temperature=25 %cutin=0.1 %cutout=0.1 effcurve=Myeff P-TCurve=MyPvsT Daily=PVIrrad_RMTQ1302 TDaily=MyTemp
New "PVsystem.BT_120e009a6ff819dceec8ee606da49b433ae0cc1442bf256be706842d65c80e3d_M1" phases=3 bus1="BT1002052207.1.2.3.4" conn=Delta kv=0.22 pf=1.0 pmpp=0.896 kva=0.779 %pmpp=100 irradiance=0.59 temperature=25 %cutin=0.1 %cutout=0.1 effcurve=Myeff P-TCurve=MyPvsT Daily=PVIrrad_RMTQ1302 TDaily=MyTemp
New "PVsystem.BT_8a16ba697098af3d03e5e6663a8a6df4f22508fa2cc20701f23bec022ec0a564_M1" phases=3 bus1="BT1002138642.1.2.3.4" conn=Delta kv=0.22 pf=1.0 pmpp=1.421 kva=1.236 %pmpp=100 irradiance=0.59 temperature=25 %cutin=0.1 %cutout=0.1 effcurve=Myeff P-TCurve=MyPvsT Daily=PVIrrad_RMTQ1302 TDaily=MyTemp
New "PVsystem.BT_5dbf7424b5eb18ac1c56e2a4a04145da03033351ab5dbe5cfd723d7e2917c88c_M1" phases=3 bus1="BT1002196638.1.2.3.4" conn=Delta kv=0.22 pf=1.0 pmpp=0.886 kva=0.770 %pmpp=100 irradiance=0.59 temperature=25 %cutin=0.1 %cutout=0.1 effcurve=Myeff P-TCurve=MyPvsT Daily=PVIrrad_RMTQ1302 TDaily=MyTemp
!New "PVsystem.BT_f8526ba94fd0f8af0622da7bcf0a0a88342a4b30ece47f0ca7a650ea7292c318_M1" phases=3 bus1="BT1002037714.1.2.3.4" conn=Delta kv=0.22 pf=1.0 pmpp=0.000 kva=0.000 %pmpp=100 irradiance=0.59 temperature=25 %cutin=0.1 %cutout=0.1 effcurve=Myeff P-TCurve=MyPvsT Daily=PVIrrad_RMTQ1302 TDaily=MyTemp
New "PVsystem.BT_55a2bbbdea77b324c93d0ef21aa804efec18d83d65ecaff30415c63cfd9a2f34_M1" phases=3 bus1="BT1001980794.1.2.3.4" conn=Delta kv=0.22 pf=1.0 pmpp=0.477 kva=0.415 %pmpp=100 irradiance=0.59 temperature=25 %cutin=0.1 %cutout=0.1 effcurve=Myeff P-TCurve=MyPvsT Daily=PVIrrad_RMTQ1302 TDaily=MyTemp
New "PVsystem.BT_13874b4945200ca3892d531f058a28502a8224c5da0ca5417ca080e092edbc9d_M1" phases=3 bus1="BT1002117875.1.2.3.4" conn=Delta kv=0.22 pf=1.0 pmpp=0.589 kva=0.512 %pmpp=100 irradiance=0.59 temperature=25 %cutin=0.1 %cutout=0.1 effcurve=Myeff P-TCurve=MyPvsT Daily=PVIrrad_RMTQ1302 TDaily=MyTemp
New "PVsystem.BT_ce72de0c8be96c2d216f8e36b4babb3370a7964e039182761d512986ea8037a1_M1" phases=3 bus1="BT1002051145.1.2.3.4" conn=Delta kv=0.22 pf=1.0 pmpp=0.381 kva=0.331 %pmpp=100 irradiance=0.59 temperature=25 %cutin=0.1 %cutout=0.1 effcurve=Myeff P-TCurve=MyPvsT Daily=PVIrrad_RMTQ1302 TDaily=MyTemp
New "PVsystem.BT_ad6c669326d30a9814ae8335cf79e029a7b0e192e50803cc474f792dd72e30d6_M1" phases=3 bus1="BT1002139018.1.2.3.4" conn=Delta kv=0.22 pf=1.0 pmpp=0.302 kva=0.263 %pmpp=100 irradiance=0.59 temperature=25 %cutin=0.1 %cutout=0.1 effcurve=Myeff P-TCurve=MyPvsT Daily=PVIrrad_RMTQ1302 TDaily=MyTemp
!New "PVsystem.BT_a475e17d9606926b6fde0fb601d1d7aaa81c7b7201ed06da07231cdf7bedd740_M1" phases=3 bus1="BT1001977978.1.2.3.4" conn=Delta kv=0.22 pf=1.0 pmpp=0.000 kva=0.000 %pmpp=100 irradiance=0.59 temperature=25 %cutin=0.1 %cutout=0.1 effcurve=Myeff P-TCurve=MyPvsT Daily=PVIrrad_RMTQ1302 TDaily=MyTemp
New "PVsystem.BT_45f4ef8cb9365845a51e1493c1ccc66ab21193a7c236625968e8318f636a90ff_M1" phases=3 bus1="BT1001964544.1.2.3.4" conn=Delta kv=0.22 pf=1.0 pmpp=0.421 kva=0.366 %pmpp=100 irradiance=0.59 temperature=25 %cutin=0.1 %cutout=0.1 effcurve=Myeff P-TCurve=MyPvsT Daily=PVIrrad_RMTQ1302 TDaily=MyTemp
New "PVsystem.BT_4d14d422de39cbcd7af890e9ad5b2caf532a84f0ff7c808de741ba0d17883e4f_M1" phases=3 bus1="BT1002137820.1.2.3.4" conn=Delta kv=0.22 pf=1.0 pmpp=0.226 kva=0.196 %pmpp=100 irradiance=0.59 temperature=25 %cutin=0.1 %cutout=0.1 effcurve=Myeff P-TCurve=MyPvsT Daily=PVIrrad_RMTQ1302 TDaily=MyTemp
!New "PVsystem.BT_376078e575c75866bc562a7fbdfb54f22d6a625bf3fc63d2c86c7a8b684d693f_M1" phases=3 bus1="BT1001990350.1.2.3.4" conn=Delta kv=0.22 pf=1.0 pmpp=0.000 kva=0.000 %pmpp=100 irradiance=0.59 temperature=25 %cutin=0.1 %cutout=0.1 effcurve=Myeff P-TCurve=MyPvsT Daily=PVIrrad_RMTQ1302 TDaily=MyTemp
!New "PVsystem.BT_20c0995b96b01c67ffde69c4c60933846d2a9e7a686c802501a80dac4a999c56_M1" phases=3 bus1="BT1001999017.1.2.3.4" conn=Delta kv=0.22 pf=1.0 pmpp=0.000 kva=0.000 %pmpp=100 irradiance=0.59 temperature=25 %cutin=0.1 %cutout=0.1 effcurve=Myeff P-TCurve=MyPvsT Daily=PVIrrad_RMTQ1302 TDaily=MyTemp
!New "PVsystem.BT_b9676ac150d3626f76f4b2158ffefef604cc4abbcc029fe7f91383d3c9ab4c2f_M1" phases=3 bus1="BT1001959193.1.2.3.4" conn=Delta kv=0.22 pf=1.0 pmpp=0.000 kva=0.000 %pmpp=100 irradiance=0.59 temperature=25 %cutin=0.1 %cutout=0.1 effcurve=Myeff P-TCurve=MyPvsT Daily=PVIrrad_RMTQ1302 TDaily=MyTemp
!New "PVsystem.BT_9c077b3a77493c735927d67fdd61400389721f1c23ed118a568a7264673e3e27_M1" phases=3 bus1="BT1002094568.1.2.3.4" conn=Delta kv=0.22 pf=1.0 pmpp=0.000 kva=0.000 %pmpp=100 irradiance=0.59 temperature=25 %cutin=0.1 %cutout=0.1 effcurve=Myeff P-TCurve=MyPvsT Daily=PVIrrad_RMTQ1302 TDaily=MyTemp
New "PVsystem.BT_48f482e24d4a0b6ef583772643545d26330da054120b9799a68e48d67c528b3f_M1" phases=3 bus1="BT1002041588.1.2.3.4" conn=Delta kv=0.22 pf=1.0 pmpp=0.617 kva=0.536 %pmpp=100 irradiance=0.59 temperature=25 %cutin=0.1 %cutout=0.1 effcurve=Myeff P-TCurve=MyPvsT Daily=PVIrrad_RMTQ1302 TDaily=MyTemp
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New "PVsystem.BT_901cad2f65d80edc738fb6adb4530209dbe88acf379f316ecc479f600e2c4236_M1" phases=3 bus1="BT1002172628.1.2.3.4" conn=Delta kv=0.22 pf=1.0 pmpp=0.624 kva=0.543 %pmpp=100 irradiance=0.59 temperature=25 %cutin=0.1 %cutout=0.1 effcurve=Myeff P-TCurve=MyPvsT Daily=PVIrrad_RMTQ1302 TDaily=MyTemp
New "PVsystem.BT_a541286645d76c1c30007bbef31f6d0f9629baf6d7488f98bb5b17ccead91526_M1" phases=3 bus1="BT1002263435.1.2.3.4" conn=Delta kv=0.22 pf=1.0 pmpp=2.059 kva=1.790 %pmpp=100 irradiance=0.59 temperature=25 %cutin=0.1 %cutout=0.1 effcurve=Myeff P-TCurve=MyPvsT Daily=PVIrrad_RMTQ1302 TDaily=MyTemp
New "PVsystem.BT_8675bd76f697948a584e3b77081157d2c6291b1cf7d8959d3ef18d35e4d702e1_M1" phases=1 bus1="BT1002056574.3.1.4" conn=Delta kv=0.22 pf=1.0 pmpp=0.498 kva=0.433 %pmpp=100 irradiance=0.59 temperature=25 %cutin=0.1 %cutout=0.1 effcurve=Myeff P-TCurve=MyPvsT Daily=PVIrrad_RMTQ1302 TDaily=MyTemp
New "PVsystem.BT_29a54128e112721f70135b7ec614f9228ad377018c852ca83437d21d476c38e5_M1" phases=3 bus1="BT1002027121.1.2.3.4" conn=Delta kv=0.22 pf=1.0 pmpp=0.566 kva=0.492 %pmpp=100 irradiance=0.59 temperature=25 %cutin=0.1 %cutout=0.1 effcurve=Myeff P-TCurve=MyPvsT Daily=PVIrrad_RMTQ1302 TDaily=MyTemp
New "PVsystem.BT_8747be38c2e1401106cd53dde2b59a09d3888d743ffdb2bd79c60e2a8ce55844_M1" phases=3 bus1="BT1002182179.1.2.3.4" conn=Delta kv=0.22 pf=1.0 pmpp=0.487 kva=0.424 %pmpp=100 irradiance=0.59 temperature=25 %cutin=0.1 %cutout=0.1 effcurve=Myeff P-TCurve=MyPvsT Daily=PVIrrad_RMTQ1302 TDaily=MyTemp
New "PVsystem.BT_2499e8e620c9cbfb2f71932f335c73132eaea457b30be0849a73f90344ca6a83_M1" phases=3 bus1="BT1002066756.1.2.3.4" conn=Delta kv=0.22 pf=1.0 pmpp=0.371 kva=0.322 %pmpp=100 irradiance=0.59 temperature=25 %cutin=0.1 %cutout=0.1 effcurve=Myeff P-TCurve=MyPvsT Daily=PVIrrad_RMTQ1302 TDaily=MyTemp
New "PVsystem.BT_5d39ce729fc3a70f757827dcab1dc8beeb5a2b577740c2b7a97be028975e6297_M1" phases=3 bus1="BT1002150687.1.2.3.4" conn=Delta kv=0.22 pf=1.0 pmpp=0.406 kva=0.353 %pmpp=100 irradiance=0.59 temperature=25 %cutin=0.1 %cutout=0.1 effcurve=Myeff P-TCurve=MyPvsT Daily=PVIrrad_RMTQ1302 TDaily=MyTemp
New "PVsystem.BT_d99872f71b471fe80fb20602a9b862ce843eac14cc562a8ec00321ac5be54dc3_M1" phases=3 bus1="BT1001915401.1.2.3.4" conn=Delta kv=0.22 pf=1.0 pmpp=0.223 kva=0.194 %pmpp=100 irradiance=0.59 temperature=25 %cutin=0.1 %cutout=0.1 effcurve=Myeff P-TCurve=MyPvsT Daily=PVIrrad_RMTQ1302 TDaily=MyTemp
New "PVsystem.BT_3b8469dab0b263b924d13a26db87e9020d8eeb7a0ae5fa1eebc6d0ce12334198_M1" phases=3 bus1="BT1002136117.1.2.3.4" conn=Delta kv=0.22 pf=1.0 pmpp=0.934 kva=0.812 %pmpp=100 irradiance=0.59 temperature=25 %cutin=0.1 %cutout=0.1 effcurve=Myeff P-TCurve=MyPvsT Daily=PVIrrad_RMTQ1302 TDaily=MyTemp
New "PVsystem.BT_08e9be7ce0142751dd4b58f7112ea96c8565c7ca019e3c586227aaaa103bc0d5_M1" phases=3 bus1="BT1002172576.1.2.3.4" conn=Delta kv=0.22 pf=1.0 pmpp=0.454 kva=0.395 %pmpp=100 irradiance=0.59 temperature=25 %cutin=0.1 %cutout=0.1 effcurve=Myeff P-TCurve=MyPvsT Daily=PVIrrad_RMTQ1302 TDaily=MyTemp
New "PVsystem.BT_4801d338122163db83aa65d2220992a8a4324b6b0f2fc718084e7ecdc89a1d8a_M1" phases=3 bus1="BT1002050228.1.2.3.4" conn=Delta kv=0.22 pf=1.0 pmpp=0.759 kva=0.660 %pmpp=100 irradiance=0.59 temperature=25 %cutin=0.1 %cutout=0.1 effcurve=Myeff P-TCurve=MyPvsT Daily=PVIrrad_RMTQ1302 TDaily=MyTemp
New "PVsystem.BT_f9577f04d16dddf4704808aa98d7ca5a4095e16f1fd6155386bf8c18039a7b04_M1" phases=3 bus1="BT1002211473.1.2.3.4" conn=Delta kv=0.22 pf=1.0 pmpp=0.744 kva=0.647 %pmpp=100 irradiance=0.59 temperature=25 %cutin=0.1 %cutout=0.1 effcurve=Myeff P-TCurve=MyPvsT Daily=PVIrrad_RMTQ1302 TDaily=MyTemp
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New "PVsystem.BT_e41f06890efc00070774391f86becc219612853eda9ce43b19104bd8811165de_M1" phases=3 bus1="BT1001908163.1.2.3.4" conn=Delta kv=0.22 pf=1.0 pmpp=0.980 kva=0.852 %pmpp=100 irradiance=0.59 temperature=25 %cutin=0.1 %cutout=0.1 effcurve=Myeff P-TCurve=MyPvsT Daily=PVIrrad_RMTQ1302 TDaily=MyTemp
New "PVsystem.BT_cb8ce0aa9a239659d55efa75c5efc4c262cdf6240aa9f8a9d3c21a29d2b1372f_M1" phases=3 bus1="BT1002195014.1.2.3.4" conn=Delta kv=0.22 pf=1.0 pmpp=2.536 kva=2.205 %pmpp=100 irradiance=0.59 temperature=25 %cutin=0.1 %cutout=0.1 effcurve=Myeff P-TCurve=MyPvsT Daily=PVIrrad_RMTQ1302 TDaily=MyTemp
New "PVsystem.BT_9258db2c64d9301dfbc66956778480bd9911752495ba1a697c9362906b85ae7e_M1" phases=3 bus1="BT1002197372.1.2.3.4" conn=Delta kv=0.22 pf=1.0 pmpp=0.523 kva=0.455 %pmpp=100 irradiance=0.59 temperature=25 %cutin=0.1 %cutout=0.1 effcurve=Myeff P-TCurve=MyPvsT Daily=PVIrrad_RMTQ1302 TDaily=MyTemp
New "PVsystem.BT_a629875aa321ee9b0df32a8eacf98f82c510a0f5a17e0ee1383e0576e685933c_M1" phases=3 bus1="BT1001947485.1.2.3.4" conn=Delta kv=0.22 pf=1.0 pmpp=0.863 kva=0.750 %pmpp=100 irradiance=0.59 temperature=25 %cutin=0.1 %cutout=0.1 effcurve=Myeff P-TCurve=MyPvsT Daily=PVIrrad_RMTQ1302 TDaily=MyTemp
New "PVsystem.BT_4cb5f5065d897c9ad7fc618b6da6ca127d88acdc2147f56ed956dad759b7ee11_M1" phases=3 bus1="BT1002200380.1.2.3.4" conn=Delta kv=0.22 pf=1.0 pmpp=0.688 kva=0.598 %pmpp=100 irradiance=0.59 temperature=25 %cutin=0.1 %cutout=0.1 effcurve=Myeff P-TCurve=MyPvsT Daily=PVIrrad_RMTQ1302 TDaily=MyTemp
New "PVsystem.BT_efa3ce5119d677ead8970c5f30d524ea5fff3982d94cfdd8b6343e090e23ede9_M1" phases=1 bus1="BT1002135750.3.1.4" conn=Delta kv=0.22 pf=1.0 pmpp=0.353 kva=0.307 %pmpp=100 irradiance=0.59 temperature=25 %cutin=0.1 %cutout=0.1 effcurve=Myeff P-TCurve=MyPvsT Daily=PVIrrad_RMTQ1302 TDaily=MyTemp
New "PVsystem.BT_fe23cf8e332ff64c1bb58fa2303cafba6f0ccdc37178d203d34076352ac6c64b_M1" phases=3 bus1="BT1001995710.1.2.3.4" conn=Delta kv=0.22 pf=1.0 pmpp=0.812 kva=0.706 %pmpp=100 irradiance=0.59 temperature=25 %cutin=0.1 %cutout=0.1 effcurve=Myeff P-TCurve=MyPvsT Daily=PVIrrad_RMTQ1302 TDaily=MyTemp
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New "PVsystem.BT_0e883dfc0bbdf01df7d2b21e9ac0883a4833c77fab78dfb5e1fa9139882fd24d_M1" phases=3 bus1="BT1002038251.1.2.3.4" conn=Delta kv=0.22 pf=1.0 pmpp=1.086 kva=0.945 %pmpp=100 irradiance=0.59 temperature=25 %cutin=0.1 %cutout=0.1 effcurve=Myeff P-TCurve=MyPvsT Daily=PVIrrad_RMTQ1302 TDaily=MyTemp
New "PVsystem.BT_e4230625248e90eca1a4b806ad3875cc0240ad722ff365f2be17b613c3e31f84_M1" phases=3 bus1="BT1002149426.1.2.3.4" conn=Delta kv=0.22 pf=1.0 pmpp=0.586 kva=0.510 %pmpp=100 irradiance=0.59 temperature=25 %cutin=0.1 %cutout=0.1 effcurve=Myeff P-TCurve=MyPvsT Daily=PVIrrad_RMTQ1302 TDaily=MyTemp
New "PVsystem.BT_0f4792dd22037242ec5ae817e76bf3f6f4c17af46b80635bee52741e5ac2db17_M1" phases=3 bus1="BT1002123240.1.2.3.4" conn=Delta kv=0.22 pf=1.0 pmpp=0.201 kva=0.174 %pmpp=100 irradiance=0.59 temperature=25 %cutin=0.1 %cutout=0.1 effcurve=Myeff P-TCurve=MyPvsT Daily=PVIrrad_RMTQ1302 TDaily=MyTemp
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New "PVsystem.BT_dfb1264f70ee1a1db94611a5c54d3c04c1dab57426be99cffc5f291e4913a8af_M1" phases=3 bus1="BT1002209449.1.2.3.4" conn=Delta kv=0.22 pf=1.0 pmpp=0.289 kva=0.252 %pmpp=100 irradiance=0.59 temperature=25 %cutin=0.1 %cutout=0.1 effcurve=Myeff P-TCurve=MyPvsT Daily=PVIrrad_RMTQ1302 TDaily=MyTemp
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New "PVsystem.BT_50b30be1422db426e9dd9ad4c9f3f8993eef0ef60f0c33171226e4da2df6a06b_M1" phases=3 bus1="BT1001921036.1.2.3.4" conn=Delta kv=0.22 pf=1.0 pmpp=0.510 kva=0.444 %pmpp=100 irradiance=0.59 temperature=25 %cutin=0.1 %cutout=0.1 effcurve=Myeff P-TCurve=MyPvsT Daily=PVIrrad_RMTQ1302 TDaily=MyTemp
New "PVsystem.BT_ef624f4aefa9735b0bb0a19cbdb56d9f3c5a2beb819cce59292cee8c1d0a6a69_M1" phases=3 bus1="BT1001933188.1.2.3.4" conn=Delta kv=0.22 pf=1.0 pmpp=0.731 kva=0.636 %pmpp=100 irradiance=0.59 temperature=25 %cutin=0.1 %cutout=0.1 effcurve=Myeff P-TCurve=MyPvsT Daily=PVIrrad_RMTQ1302 TDaily=MyTemp
New "PVsystem.BT_6923f5786ea860f58731234682721582de934f0b5d079b692f365e45162287fa_M1" phases=3 bus1="BT1002004336.1.2.3.4" conn=Delta kv=0.22 pf=1.0 pmpp=0.614 kva=0.534 %pmpp=100 irradiance=0.59 temperature=25 %cutin=0.1 %cutout=0.1 effcurve=Myeff P-TCurve=MyPvsT Daily=PVIrrad_RMTQ1302 TDaily=MyTemp
New "PVsystem.BT_84d56882c314a42a4d1f681a6394b838c463be9b860dd72be00c87e5472bd395_M1" phases=3 bus1="BT1002157295.1.2.3.4" conn=Delta kv=0.22 pf=1.0 pmpp=0.744 kva=0.647 %pmpp=100 irradiance=0.59 temperature=25 %cutin=0.1 %cutout=0.1 effcurve=Myeff P-TCurve=MyPvsT Daily=PVIrrad_RMTQ1302 TDaily=MyTemp
New "PVsystem.BT_e5844984595680949c7c3e0c4fd9f0e8276b73a414c490ce68b60af9dbbe4b4f_M1" phases=3 bus1="BT1002068648.1.2.3.4" conn=Delta kv=0.22 pf=1.0 pmpp=0.627 kva=0.545 %pmpp=100 irradiance=0.59 temperature=25 %cutin=0.1 %cutout=0.1 effcurve=Myeff P-TCurve=MyPvsT Daily=PVIrrad_RMTQ1302 TDaily=MyTemp
New "PVsystem.BT_bad1e891f5a233791dd8233208335926ee3a6e3d1bcfac71949f6e5641cb4583_M1" phases=3 bus1="BT1001968248.1.2.3.4" conn=Delta kv=0.22 pf=1.0 pmpp=0.419 kva=0.364 %pmpp=100 irradiance=0.59 temperature=25 %cutin=0.1 %cutout=0.1 effcurve=Myeff P-TCurve=MyPvsT Daily=PVIrrad_RMTQ1302 TDaily=MyTemp
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New "PVsystem.BT_7c6927e95b4c151bca731d071b44a038a03974b5e43fb1fd527f1b5953506c55_M1" phases=1 bus1="BT1002088589.1.2.4" conn=Delta kv=0.22 pf=1.0 pmpp=1.396 kva=1.214 %pmpp=100 irradiance=0.59 temperature=25 %cutin=0.1 %cutout=0.1 effcurve=Myeff P-TCurve=MyPvsT Daily=PVIrrad_RMTQ1302 TDaily=MyTemp
New "PVsystem.BT_aba344b905e7a0df804ce980450ff997857345b860f01d76d8e04206bfee4c67_M1" phases=1 bus1="BT1000948243.3.1.4" conn=Delta kv=0.22 pf=1.0 pmpp=0.962 kva=0.837 %pmpp=100 irradiance=0.59 temperature=25 %cutin=0.1 %cutout=0.1 effcurve=Myeff P-TCurve=MyPvsT Daily=PVIrrad_RMTQ1302 TDaily=MyTemp
New "PVsystem.BT_9ed008e1ae87d50fd0ef742138b5a04fe9fd3f2ff624310af956368ba23a75d8_M1" phases=1 bus1="BT1000882043.3.1.4" conn=Delta kv=0.22 pf=1.0 pmpp=1.112 kva=0.967 %pmpp=100 irradiance=0.59 temperature=25 %cutin=0.1 %cutout=0.1 effcurve=Myeff P-TCurve=MyPvsT Daily=PVIrrad_RMTQ1302 TDaily=MyTemp
New "PVsystem.BT_9decd5898d064aa5f708a1fc6df7b72d85b9efbcd7fe2aa02ab86d9b3923f64f_M1" phases=1 bus1="BT1000876872.2.3.4" conn=Delta kv=0.22 pf=1.0 pmpp=0.404 kva=0.351 %pmpp=100 irradiance=0.59 temperature=25 %cutin=0.1 %cutout=0.1 effcurve=Myeff P-TCurve=MyPvsT Daily=PVIrrad_RMTQ1302 TDaily=MyTemp
New "PVsystem.BT_589ec5e66c9384d7853d572b5f63821b132bb5118e5340944df0414afaf8756c_M1" phases=1 bus1="BT1000888454.3.1.4" conn=Delta kv=0.22 pf=1.0 pmpp=0.914 kva=0.795 %pmpp=100 irradiance=0.59 temperature=25 %cutin=0.1 %cutout=0.1 effcurve=Myeff P-TCurve=MyPvsT Daily=PVIrrad_RMTQ1302 TDaily=MyTemp
New "PVsystem.BT_56310aeaa5ee118fce75831c760b79d932127102b5adc1994ef05294806a8681_M1" phases=1 bus1="BT1002111803.1.2.4" conn=Delta kv=0.22 pf=1.0 pmpp=1.368 kva=1.190 %pmpp=100 irradiance=0.59 temperature=25 %cutin=0.1 %cutout=0.1 effcurve=Myeff P-TCurve=MyPvsT Daily=PVIrrad_RMTQ1302 TDaily=MyTemp
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New "PVsystem.BT_e23f8cd29936c9e1b410ec2a0b572b52d5cc2e8c605199471b36fa6c715836d9_M1" phases=3 bus1="BT1002118727.1.2.3.4" conn=Delta kv=0.22 pf=1.0 pmpp=0.269 kva=0.234 %pmpp=100 irradiance=0.59 temperature=25 %cutin=0.1 %cutout=0.1 effcurve=Myeff P-TCurve=MyPvsT Daily=PVIrrad_RMTQ1302 TDaily=MyTemp
New "PVsystem.BT_3441a147528c9e8659457d5f29f43e3e2a259dc81dd48dbee64206139f99fadb_M1" phases=3 bus1="BT1002163702.1.2.3.4" conn=Delta kv=0.22 pf=1.0 pmpp=0.348 kva=0.302 %pmpp=100 irradiance=0.59 temperature=25 %cutin=0.1 %cutout=0.1 effcurve=Myeff P-TCurve=MyPvsT Daily=PVIrrad_RMTQ1302 TDaily=MyTemp
New "PVsystem.BT_a109e6e72ed7a6168ef42edaea3145a815ce0c69c7991bcbc46e12fc1837ee2c_M1" phases=3 bus1="BT1002116429.1.2.3.4" conn=Delta kv=0.22 pf=1.0 pmpp=0.404 kva=0.351 %pmpp=100 irradiance=0.59 temperature=25 %cutin=0.1 %cutout=0.1 effcurve=Myeff P-TCurve=MyPvsT Daily=PVIrrad_RMTQ1302 TDaily=MyTemp
New "PVsystem.BT_f4c50ab9b1291f3731e0a14458113c9502e5976ea12b38202ecee185989a76c1_M1" phases=3 bus1="BT1002101949.1.2.3.4" conn=Delta kv=0.22 pf=1.0 pmpp=0.135 kva=0.117 %pmpp=100 irradiance=0.59 temperature=25 %cutin=0.1 %cutout=0.1 effcurve=Myeff P-TCurve=MyPvsT Daily=PVIrrad_RMTQ1302 TDaily=MyTemp
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New "PVsystem.BT_b94fd2aa69c8546396dcc67a7c4474cdb7b55e345798671f9a9c690c8bd4f9ec_M1" phases=3 bus1="BT1002078401.1.2.3.4" conn=Delta kv=0.22 pf=1.0 pmpp=0.414 kva=0.360 %pmpp=100 irradiance=0.59 temperature=25 %cutin=0.1 %cutout=0.1 effcurve=Myeff P-TCurve=MyPvsT Daily=PVIrrad_RMTQ1302 TDaily=MyTemp
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New "PVsystem.BT_ff41c383f26da1ec1b475eb97155cdf8ce844118ecac3254f7e45ad2f4662f4d_M1" phases=3 bus1="BT1002194866.1.2.3.4" conn=Delta kv=0.22 pf=1.0 pmpp=0.528 kva=0.459 %pmpp=100 irradiance=0.59 temperature=25 %cutin=0.1 %cutout=0.1 effcurve=Myeff P-TCurve=MyPvsT Daily=PVIrrad_RMTQ1302 TDaily=MyTemp
New "PVsystem.BT_a41cdbdbd1dd6457470ffd70b07c218fdffc26ffaec912eceb56b9c6e9b1e66a_M1" phases=3 bus1="BT1001986472.1.2.3.4" conn=Delta kv=0.22 pf=1.0 pmpp=0.619 kva=0.539 %pmpp=100 irradiance=0.59 temperature=25 %cutin=0.1 %cutout=0.1 effcurve=Myeff P-TCurve=MyPvsT Daily=PVIrrad_RMTQ1302 TDaily=MyTemp
New "PVsystem.BT_e259bf83757ef8b5206f440dd18e117cda17d2289cf432709f74e519d70ae046_M1" phases=3 bus1="BT1002109997.1.2.3.4" conn=Delta kv=0.22 pf=1.0 pmpp=0.866 kva=0.753 %pmpp=100 irradiance=0.59 temperature=25 %cutin=0.1 %cutout=0.1 effcurve=Myeff P-TCurve=MyPvsT Daily=PVIrrad_RMTQ1302 TDaily=MyTemp
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New "PVsystem.BT_ad056ca86cd13a73b475082238f3670d09bb37619aed4159ba57172ef9309763_M1" phases=1 bus1="BT1002138453.1.2.4" conn=Delta kv=0.22 pf=1.0 pmpp=0.096 kva=0.084 %pmpp=100 irradiance=0.59 temperature=25 %cutin=0.1 %cutout=0.1 effcurve=Myeff P-TCurve=MyPvsT Daily=PVIrrad_RMTQ1302 TDaily=MyTemp
New "PVsystem.BT_ddd1fe067e55d8c38184edfe7a445c34016a00df6cfb8e87733d4969e0844299_M1" phases=3 bus1="BT1001979635.1.2.3.4" conn=Delta kv=0.22 pf=1.0 pmpp=0.495 kva=0.430 %pmpp=100 irradiance=0.59 temperature=25 %cutin=0.1 %cutout=0.1 effcurve=Myeff P-TCurve=MyPvsT Daily=PVIrrad_RMTQ1302 TDaily=MyTemp
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New "PVsystem.BT_3c531ffce8cfa6f62011e8530709a00d7b6868c36233dbc4f59dbaef7f617b5e_M1" phases=3 bus1="BT1001977078.1.2.3.4" conn=Delta kv=0.22 pf=1.0 pmpp=0.376 kva=0.327 %pmpp=100 irradiance=0.59 temperature=25 %cutin=0.1 %cutout=0.1 effcurve=Myeff P-TCurve=MyPvsT Daily=PVIrrad_RMTQ1302 TDaily=MyTemp
New "PVsystem.BT_60ef79639a43823db71f2e3a1290bf0d214fb594b79af91c5330fa54a0827752_M1" phases=3 bus1="BT1002118731.1.2.3.4" conn=Delta kv=0.22 pf=1.0 pmpp=0.810 kva=0.704 %pmpp=100 irradiance=0.59 temperature=25 %cutin=0.1 %cutout=0.1 effcurve=Myeff P-TCurve=MyPvsT Daily=PVIrrad_RMTQ1302 TDaily=MyTemp
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New "PVsystem.BT_0f9447db2d648f116ead5b9d9a5dc4712db30ba4f2c5ced9eca5ee081130bfdb_M1" phases=3 bus1="BT1002180538.1.2.3.4" conn=Delta kv=0.22 pf=1.0 pmpp=0.406 kva=0.353 %pmpp=100 irradiance=0.59 temperature=25 %cutin=0.1 %cutout=0.1 effcurve=Myeff P-TCurve=MyPvsT Daily=PVIrrad_RMTQ1302 TDaily=MyTemp
New "PVsystem.BT_94719339ebcf2830f25b43aff779165543f00c8792b7d511a787f07b3c53223b_M1" phases=3 bus1="BT1002179384.1.2.3.4" conn=Delta kv=0.22 pf=1.0 pmpp=0.190 kva=0.166 %pmpp=100 irradiance=0.59 temperature=25 %cutin=0.1 %cutout=0.1 effcurve=Myeff P-TCurve=MyPvsT Daily=PVIrrad_RMTQ1302 TDaily=MyTemp
New "PVsystem.BT_78d4a39ca623488e69a6a94004c58497a7fceec8b4228c77910e9b91030a4631_M1" phases=3 bus1="BT1002217324.1.2.3.4" conn=Delta kv=0.22 pf=1.0 pmpp=1.226 kva=1.066 %pmpp=100 irradiance=0.59 temperature=25 %cutin=0.1 %cutout=0.1 effcurve=Myeff P-TCurve=MyPvsT Daily=PVIrrad_RMTQ1302 TDaily=MyTemp
New "PVsystem.BT_acb52bd46f2b30658df583777d718f0f8fd8c372775ae9989ee351dddf633329_M1" phases=3 bus1="BT1002273930.1.2.3.4" conn=Delta kv=0.22 pf=1.0 pmpp=1.229 kva=1.068 %pmpp=100 irradiance=0.59 temperature=25 %cutin=0.1 %cutout=0.1 effcurve=Myeff P-TCurve=MyPvsT Daily=PVIrrad_RMTQ1302 TDaily=MyTemp
New "PVsystem.BT_93182b985101c149c9389109aa63c1f225c06b3e2c09f3ca19cc805de2a6ecce_M1" phases=3 bus1="BT1002256381.1.2.3.4" conn=Delta kv=0.22 pf=1.0 pmpp=0.741 kva=0.645 %pmpp=100 irradiance=0.59 temperature=25 %cutin=0.1 %cutout=0.1 effcurve=Myeff P-TCurve=MyPvsT Daily=PVIrrad_RMTQ1302 TDaily=MyTemp
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New "PVsystem.BT_2f669f28532073f1f79bcfd0ecd511714f0cd1b475b74d4ece0b3ccd29435926_M1" phases=3 bus1="BT1002036876.1.2.3.4" conn=Delta kv=0.22 pf=1.0 pmpp=1.518 kva=1.320 %pmpp=100 irradiance=0.59 temperature=25 %cutin=0.1 %cutout=0.1 effcurve=Myeff P-TCurve=MyPvsT Daily=PVIrrad_RMTQ1302 TDaily=MyTemp
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New "PVsystem.BT_94dcf2008ea9f79a465aff2c6860a95e2ac5c24f1ad1b487d34025fa0f5afcc1_M1" phases=3 bus1="BT1001977593.1.2.3.4" conn=Delta kv=0.22 pf=1.0 pmpp=1.180 kva=1.026 %pmpp=100 irradiance=0.59 temperature=25 %cutin=0.1 %cutout=0.1 effcurve=Myeff P-TCurve=MyPvsT Daily=PVIrrad_RMTQ1302 TDaily=MyTemp
New "PVsystem.BT_f6e714bbf5d94067d8db9409970c77258f1375f51d709613a635efb97e34d978_M1" phases=3 bus1="BT1002187209.1.2.3.4" conn=Delta kv=0.22 pf=1.0 pmpp=2.328 kva=2.024 %pmpp=100 irradiance=0.59 temperature=25 %cutin=0.1 %cutout=0.1 effcurve=Myeff P-TCurve=MyPvsT Daily=PVIrrad_RMTQ1302 TDaily=MyTemp
New "PVsystem.BT_0ffed8d4c0130f286496227fdb4dffed7fd92ee4895c950079cfedbf5ca12f1b_M1" phases=3 bus1="BT1002195619.1.2.3.4" conn=Delta kv=0.22 pf=1.0 pmpp=0.909 kva=0.790 %pmpp=100 irradiance=0.59 temperature=25 %cutin=0.1 %cutout=0.1 effcurve=Myeff P-TCurve=MyPvsT Daily=PVIrrad_RMTQ1302 TDaily=MyTemp
New "PVsystem.BT_562882b9e9926b509ab8825d7820d8e56a0e20d59a083e6184e6e5c905f32565_M1" phases=3 bus1="BT1002122987.1.2.3.4" conn=Delta kv=0.22 pf=1.0 pmpp=0.553 kva=0.481 %pmpp=100 irradiance=0.59 temperature=25 %cutin=0.1 %cutout=0.1 effcurve=Myeff P-TCurve=MyPvsT Daily=PVIrrad_RMTQ1302 TDaily=MyTemp
New "PVsystem.BT_49f8e7b72487386cef3a140db5f5b2172ad364a7a660fefa1fd6f900e574bf48_M1" phases=3 bus1="BT1002016750.1.2.3.4" conn=Delta kv=0.22 pf=1.0 pmpp=1.010 kva=0.878 %pmpp=100 irradiance=0.59 temperature=25 %cutin=0.1 %cutout=0.1 effcurve=Myeff P-TCurve=MyPvsT Daily=PVIrrad_RMTQ1302 TDaily=MyTemp
New "PVsystem.BT_8a455a1137081d127af2ccca7fbb556ed6ca9e4420dc03c5c5a3f1fb61215d3a_M1" phases=1 bus1="BT1002029606.3.1.4" conn=Delta kv=0.22 pf=1.0 pmpp=0.503 kva=0.437 %pmpp=100 irradiance=0.59 temperature=25 %cutin=0.1 %cutout=0.1 effcurve=Myeff P-TCurve=MyPvsT Daily=PVIrrad_RMTQ1302 TDaily=MyTemp
New "PVsystem.BT_d51ca16319b4d9947361c459e7e7580ac5f8e55b0db4a6dbeb5a6f806b5f6d2a_M1" phases=1 bus1="BT1002149456.3.1.4" conn=Delta kv=0.22 pf=1.0 pmpp=0.439 kva=0.382 %pmpp=100 irradiance=0.59 temperature=25 %cutin=0.1 %cutout=0.1 effcurve=Myeff P-TCurve=MyPvsT Daily=PVIrrad_RMTQ1302 TDaily=MyTemp
New "PVsystem.BT_93b18dabf80243fe18e7aa10cd842404b2e9f48346be6d3b302dd20653ebedbb_M1" phases=3 bus1="BT1001982750.1.2.3.4" conn=Delta kv=0.22 pf=1.0 pmpp=0.343 kva=0.298 %pmpp=100 irradiance=0.59 temperature=25 %cutin=0.1 %cutout=0.1 effcurve=Myeff P-TCurve=MyPvsT Daily=PVIrrad_RMTQ1302 TDaily=MyTemp
New "PVsystem.BT_4b5a8158462f56456364766298b992257cbdd453f3aa918cc053dc1c263b3858_M1" phases=1 bus1="BT1001902924.1.2.4" conn=Delta kv=0.22 pf=1.0 pmpp=1.193 kva=1.037 %pmpp=100 irradiance=0.59 temperature=25 %cutin=0.1 %cutout=0.1 effcurve=Myeff P-TCurve=MyPvsT Daily=PVIrrad_RMTQ1302 TDaily=MyTemp
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New "PVsystem.BT_84e56fafc9cefe4c212222ede4bf5b33328a3cde63bac1893ee3fe6fbd36257d_M1" phases=3 bus1="BT1001959999.1.2.3.4" conn=Delta kv=0.22 pf=1.0 pmpp=0.325 kva=0.283 %pmpp=100 irradiance=0.59 temperature=25 %cutin=0.1 %cutout=0.1 effcurve=Myeff P-TCurve=MyPvsT Daily=PVIrrad_RMTQ1302 TDaily=MyTemp
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New "PVsystem.BT_9b75578c8ab4e85513ed8edffe307dc48cb6fbc1e4016fd191a9db111eea045f_M1" phases=3 bus1="BT1001972547.1.2.3.4" conn=Delta kv=0.22 pf=1.0 pmpp=0.675 kva=0.587 %pmpp=100 irradiance=0.59 temperature=25 %cutin=0.1 %cutout=0.1 effcurve=Myeff P-TCurve=MyPvsT Daily=PVIrrad_RMTQ1302 TDaily=MyTemp
New "PVsystem.BT_e183ee1ecd2b08522d478a226b6bb9d1932b004f5eb49c8432f58a3d9f310d1d_M1" phases=3 bus1="BT1001720060.1.2.3.4" conn=Delta kv=0.22 pf=1.0 pmpp=0.670 kva=0.583 %pmpp=100 irradiance=0.59 temperature=25 %cutin=0.1 %cutout=0.1 effcurve=Myeff P-TCurve=MyPvsT Daily=PVIrrad_RMTQ1302 TDaily=MyTemp
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New "PVsystem.BT_e1624aee8767b45c6073650b1e1748c5cfdfacbd7a515c242a4840e43ceecfcf_M1" phases=3 bus1="BT1000893652.1.2.3.4" conn=Delta kv=0.22 pf=1.0 pmpp=20.510 kva=17.835 %pmpp=100 irradiance=0.59 temperature=25 %cutin=0.1 %cutout=0.1 effcurve=Myeff P-TCurve=MyPvsT Daily=PVIrrad_RMTQ1302 TDaily=MyTemp
New "PVsystem.BT_464411e9a3ed75cc62babf119e9156303c16d3e4828e76f445af82a1a634052d_M1" phases=3 bus1="BT1000970837.1.2.3.4" conn=Delta kv=0.22 pf=1.0 pmpp=5.214 kva=4.534 %pmpp=100 irradiance=0.61 temperature=25 %cutin=0.1 %cutout=0.1 effcurve=Myeff P-TCurve=MyPvsT Daily=PVIrrad_RMTQ1302 TDaily=MyTemp
New "PVsystem.BT_e726da7f6e1a2d4c35d425a8db91102d7e1bdc9ecc81c4001fc6aeb3158b6133_M1" phases=3 bus1="BT1000970834.1.2.3.4" conn=Delta kv=0.22 pf=1.0 pmpp=1.825 kva=1.587 %pmpp=100 irradiance=0.61 temperature=25 %cutin=0.1 %cutout=0.1 effcurve=Myeff P-TCurve=MyPvsT Daily=PVIrrad_RMTQ1302 TDaily=MyTemp
New "PVsystem.BT_3bfc200778b7e4cd80ff3930bc230c2f91aba1fa515d4c600ecbfbab70ce1cc9_M1" phases=3 bus1="BT1000956375.1.2.3.4" conn=Delta kv=0.22 pf=1.0 pmpp=2.234 kva=1.942 %pmpp=100 irradiance=0.61 temperature=25 %cutin=0.1 %cutout=0.1 effcurve=Myeff P-TCurve=MyPvsT Daily=PVIrrad_RMTQ1302 TDaily=MyTemp
